<?xml version="1.0" encoding="UTF-8"?>
<fdm_config name="D150 AGILE" release="BETA" version="2.0">
   <metrics>
      <wingarea unit="M2">130.514</wingarea>
      <wingspan unit="M">33.914</wingspan>
      <chord unit="M">4.192</chord>
      <htailarea unit="M2">32.758</htailarea>
      <htailarm unit="M">17.727</htailarm>
      <vtailarea unit="M2">46.589</vtailarea>
      <htailarm unit="M2">16.961</htailarm>
      <location name="AERORP" unit="M">
         <x>16.3282</x>
         <y>0.000000</y>
         <z>-1.136280</z>
      </location>
      <location name="EYEPOINT" unit="M">
         <x>14.6200</x>
         <y>0.000000</y>
         <z>-0.100000</z>
      </location>
      <location name="VRP" unit="M">
         <x>16.3282</x>
         <y>0.000000</y>
         <z>-1.136280</z>
      </location>
   </metrics>
   <mass_balance>
      <ixx unit="KG*M2">761969.688</ixx>
      <iyy unit="KG*M2">1997119.840</iyy>
      <izz unit="KG*M2">2567919.197</izz>
      <ixy unit="KG*M2">0.000000</ixy>
      <ixz unit="KG*M2">8000.000</ixz>
      <iyz unit="KG*M2">0.000000</iyz>
      <emptywt unit="KG">20000.020</emptywt>
      <location name="CG" unit="M">
         <x>16.0519</x>
         <y>0.000000</y>
         <z>0.000000</z>
      </location>
   </mass_balance>
   <ground_reactions>
      <contact name="Nose Gear" type="BOGEY">
         <location unit="M">
            <x>5.0720</x>
            <y>0.000000</y>
            <z>-1.690730</z>
            <brake_group>NONE</brake_group>
            <retractable>1.0000</retractable>
         </location>
         <static_friction>0.8000</static_friction>
         <dynamic_friction>0.5000</dynamic_friction>
         <rolling_friction>0.0200</rolling_friction>
         <spring_coeff unit="LBS/FT">133934.750</spring_coeff>
         <dynamic_coeff unit="LBS/FT">5952.656</dynamic_coeff>
         <damping_coeff_rebound unit="LBS/FT/SEC">11905.311</damping_coeff_rebound>
         <max_steer unit="DEG">35.000</max_steer>
      </contact>
      <contact name="Right Main Gear" type="BOGEY">
         <location unit="M">
            <x>16.1264</x>
            <y>3.7814</y>
            <z>-1.305452</z>
            <brake_group>RIGHT</brake_group>
            <retractable>1.0000</retractable>
         </location>
         <static_friction>0.8000</static_friction>
         <dynamic_friction>0.5000</dynamic_friction>
         <rolling_friction>0.0200</rolling_friction>
         <spring_coeff unit="LBS/FT">178579.673</spring_coeff>
         <dynamic_coeff unit="LBS/FT">14881.640</dynamic_coeff>
         <damping_coeff_rebound unit="LBS/FT/SEC">29763.270</damping_coeff_rebound>
         <max_steer unit="DEG">0.000000</max_steer>
      </contact>
      <contact name="Left Main Gear" type="BOGEY">
         <location unit="M">
            <x>16.1264</x>
            <y>-3.781379</y>
            <z>-1.305452</z>
            <brake_group>LEFT</brake_group>
            <retractable>1.0000</retractable>
         </location>
         <static_friction>0.8000</static_friction>
         <dynamic_friction>0.5000</dynamic_friction>
         <rolling_friction>0.0200</rolling_friction>
         <spring_coeff unit="LBS/FT">178579.673</spring_coeff>
         <dynamic_coeff unit="LBS/FT">14881.640</dynamic_coeff>
         <damping_coeff_rebound unit="LBS/FT/SEC">29763.270</damping_coeff_rebound>
         <max_steer unit="DEG">0.000000</max_steer>
      </contact>
   </ground_reactions>
   <propulsion>
      <engine file="D150_AGILE_engine">
         <location unit="M">
            <x>13.6765</x>
            <y>5.7482</y>
            <z>-2.338950</z>
         </location>
         <orient unit="DEG">
            <roll>0.000000</roll>
            <pitch>0.000000</pitch>
            <yaw>0.000000</yaw>
         </orient>
         <feed>0</feed>
         <feed>1</feed>
         <feed>2</feed>
         <thruster file="direct">
            <location unit="M">
               <x>13.6765</x>
               <y>5.7482</y>
               <z>-2.338950</z>
            </location>
            <orient unit="DEG">
               <roll>0.000000</roll>
               <pitch>0.000000</pitch>
               <yaw>0.000000</yaw>
            </orient>
         </thruster>
      </engine>
      <engine file="D150_AGILE_engine">
         <location unit="M">
            <x>13.6765</x>
            <y>-5.748200</y>
            <z>-2.338950</z>
         </location>
         <orient unit="DEG">
            <roll>0.000000</roll>
            <pitch>0.000000</pitch>
            <yaw>0.000000</yaw>
         </orient>
         <feed>3</feed>
         <feed>4</feed>
         <feed>5</feed>
         <thruster file="direct">
            <location unit="M">
               <x>13.6765</x>
               <y>-5.748200</y>
               <z>-2.338950</z>
            </location>
            <orient unit="DEG">
               <roll>0.000000</roll>
               <pitch>0.000000</pitch>
               <yaw>0.000000</yaw>
            </orient>
         </thruster>
      </engine>
      <propulsion>
         <tank type="FUEL">
            <location unit="M">
               <x>14.7736</x>
               <y>0.9362</y>
               <z>-1.212579</z>
            </location>
            <capacity unit="KG">3271.985</capacity>
            <contents unit="KG">3271.985</contents>
         </tank>
         <tank type="FUEL">
            <location unit="M">
               <x>15.9503</x>
               <z>-0.881934</z>
               <y>4.7680</y>
            </location>
            <capacity unit="KG">5532.997</capacity>
            <contents unit="KG">5532.997</contents>
         </tank>
         <tank type="FUEL">
            <location unit="M">
               <x>18.8026</x>
               <z>-0.241955</z>
               <y>11.3816</y>
            </location>
            <capacity unit="KG">707.706</capacity>
            <contents unit="KG">707.706</contents>
         </tank>
      </propulsion>
      <propulsion>
         <tank type="FUEL">
            <location unit="M">
               <x>14.7736</x>
               <y>-0.936171</y>
               <z>-1.212579</z>
            </location>
            <capacity unit="KG">3271.985</capacity>
            <contents unit="KG">3271.985</contents>
         </tank>
         <tank type="FUEL">
            <location unit="M">
               <x>15.9503</x>
               <z>-0.881934</z>
               <y>-4.767959</y>
            </location>
            <capacity unit="KG">5532.997</capacity>
            <contents unit="KG">5532.997</contents>
         </tank>
         <tank type="FUEL">
            <location unit="M">
               <x>18.8026</x>
               <z>-0.241955</z>
               <y>-11.381596</y>
            </location>
            <capacity unit="KG">707.706</capacity>
            <contents unit="KG">707.706</contents>
         </tank>
      </propulsion>
   </propulsion>
   <flight_control name="FCS :D150 AGILE">
      <channel name="Pitch">
         <summer name="fcs/pitch-trim-sum">
            <input>fcs/elevator-cmd-norm</input>
            <input>fcs/pitch-trim-cmd-norm</input>
            <clipto>
               <min>-1</min>
               <max>1</max>
            </clipto>
         </summer>
         <aerosurface_scale name="Elevator Control">
            <input>fcs/pitch-trim-sum</input>
            <range>
               <min>-15.0</min>
               <max>30.0</max>
            </range>
            <output>fcs/elevator-pos-deg</output>
         </aerosurface_scale>
         <aerosurface_scale name="Elevator Normalized">
            <input>fcs/elevator-pos-deg</input>
            <domain>
               <min>-15.0</min>
               <max>30.0</max>
            </domain>
            <range>
               <min> -1</min>
               <max> 1</max>
            </range>
            <output>fcs/elevator-pos-norm</output>
         </aerosurface_scale>
      </channel>
      <channel name="Yaw">
         <summer name="fcs/yaw-trim-sum">
            <input>fcs/rudder-cmd-norm</input>
            <input>fcs/yaw-trim-cmd-norm</input>
            <clipto>
               <min>-1</min>
               <max>1</max>
            </clipto>
         </summer>
         <aerosurface_scale name="Rudder Control">
            <input>fcs/yaw-trim-sum</input>
            <range>
               <min>-30.0</min>
               <max>30.0</max>
            </range>
            <output>fcs/rudder-pos-deg</output>
         </aerosurface_scale>
         <aerosurface_scale name="Rudder Normalized">
            <input>fcs/rudder-pos-deg</input>
            <domain>
               <min>-30.0</min>
               <max>30.0</max>
            </domain>
            <range>
               <min> -1</min>
               <max> 1</max>
            </range>
            <output>fcs/rudder-pos-norm</output>
         </aerosurface_scale>
      </channel>
      <channel name="Roll">
         <summer name="roll Trim Sum">
            <input>fcs/aileron-cmd-norm</input>
            <input>fcs/roll-trim-cmd-norm</input>
            <clipto>
               <min>-1</min>
               <max>1</max>
            </clipto>
         </summer>
         <aerosurface_scale name="Right Aileron Control">
            <input>fcs/roll-trim-sum</input>
            <output>fcs/right-aileron-pos-deg</output>
            <range>
               <min>-25.0</min>
               <max>25.0</max>
            </range>
         </aerosurface_scale>
         <aerosurface_scale name="Right Aileron Normalized">
            <input>fcs/right-aileron-pos-deg</input>
            <domain>
               <min>-25.0</min>
               <max>25.0</max>
            </domain>
            <range>
               <min> -1</min>
               <max> 1</max>
            </range>
            <output>fcs/right-aileron-pos-norm</output>
         </aerosurface_scale>
         <aerosurface_scale name="Left Aileron Control">
            <input>fcs/roll-trim-sum</input>
            <output>fcs/left-aileron-pos-rad</output>
            <range>
               <min>-25.0</min>
               <max>25.0</max>
            </range>
            <gain>0.0175</gain>
         </aerosurface_scale>
         <aerosurface_scale name="Left Aileron position normalized">
            <input>fcs/left-aileron-pos-deg</input>
            <domain>
               <min>-25.0</min>
               <max>25.0</max>
            </domain>
            <range>
               <min> -1</min>
               <max> 1</max>
            </range>
            <output>fcs/left-aileron-pos-norm</output>
         </aerosurface_scale>
      </channel>
      <channel name="Flap">
         <aerosurface_scale name="Flap Position Normalizer">
            <input>fcs/flap-pos-deg</input>
            <domain>
               <min>0</min>
               <max>35.0</max>
            </domain>
            <range>
               <min> 0</min>
               <max> 1</max>
            </range>
            <output>fcs/flap-pos-norm</output>
         </aerosurface_scale>
      </channel>
   </flight_control>
   <aerodynamics>
         <function name="aero/angle/right_wing_tip_alpha">
        <description>
          This parameter calculates the angle of attack at the right wingtip,
          accounting for the motion of the wing at that point away from the CG.
        </description>
        <atan2>
          <sum>
            <property>velocities/w-aero-fps</property>
            <product>
              <property>velocities/p-aero-rad_sec</property>
              <value>14</value> <!-- distance in feet from CG to wingtip -->
            </product>
          </sum>
          <difference>
            <property>velocities/u-aero-fps</property>
            <product>
              <property>velocities/r-aero-rad_sec</property>
              <value>50</value>
            </product>
          </difference>
        </atan2>
      </function>

      <function name="aero/function/ground-effect-factor-lift">
            <description>Change in lift due to ground effect factor.</description>
            <table>
                <independentVar>aero/h_b-mac-ft</independentVar> <!-- row lookup -->
                <tableData>
                    0.0  1.203
                    0.1  1.127
                    0.15 1.090
                    0.2  1.073
                    0.3  1.046
                    0.4  1.055
                    0.5  1.019
                    0.6  1.013
                    0.7  1.008
                    0.8  1.006
                    0.9  1.003
                    1.0  1.002
                    1.1  1.0
                </tableData>
            </table>
        </function>

        <function name="aero/function/ground-effect-factor-drag">
            <description>Change in drag due to ground effect</description>
            <table>
                <independentVar>aero/h_b-mac-ft</independentVar>
                <tableData>
                    0.0  0.480
                    0.1  0.515
                    0.15 0.629
                    0.2  0.709
                    0.3  0.815
                    0.4  0.882
                    0.5  0.928
                    0.6  0.962
                    0.7  0.988
                    0.8  1.0
                    0.9  1.0
                    1.0  1.0
                    1.1  1.0
                </tableData>
            </table>
        </function>
      <axis name="DRAG">
         <function name="aero/forces/drag_basic_Mach">
            <description>drag force due to alpha beta Reynolds number and Mach number</description>
            <product>
               <property>aero/qbar-psf</property>
               <property>metrics/Sw-sqft</property>
               <property>aero/function/drag_coeff_basic_Mach</property>
            </product>
         </function>
         <function name="aero/function/drag_coeff_basic_Mach">
            <product>
               <interpolate1d>
                  <p>velocities/mach</p>
                  <v>0.200</v>
                  <p>aero/function/drag_coeff_basic_M0</p>
                  <v>0.600</v>
                  <p>aero/function/drag_coeff_basic_M1</p>
                  <v>0.780</v>
                  <p>aero/function/drag_coeff_basic_M2</p>
                  <v>0.800</v>
                  <p>aero/function/drag_coeff_basic_M3</p>
               </interpolate1d>
            </product>
         </function>
         <function name="aero/function/drag_coeff_basic_M0">
            <product>
               <table>
                  <independentVar lookup="row">aero/alpha-deg</independentVar>
                  <independentVar lookup="column">aero/beta-deg</independentVar>
                  <independentVar lookup="table">aero/Re</independentVar>
                  <tableData breakPoint="201825.0784">
 	0.0	10.0
-5.0	0.0023264608105732117	0.006092301193227579
-2.5	6.593089183729332E-4	0.004823720895149592
0.0	0.0026414	0.007085716312585755
1.0	0.00445597662464807	0.008981375601177288
2.0	0.006847856294847406	0.011438363516096646
3.0	0.009806478002083736	0.014444198582858255
4.0	0.013308616784374998	0.017961062881949593
5.0	0.017317543377671517	0.021850895364885145
6.0	0.021801128930038563	0.02554771363947389
7.5	0.02962533815637025	0.030203973085777325
10.0	0.0467918212470009	0.051603854270714566
12.5	0.06759191118071334	0.07117912937004349
</tableData>
                  <tableData breakPoint="3.36054752352E7">
 	0.0	10.0
-5.0	0.0023264608105732117	0.006092301193227579
-2.5	6.593089183729332E-4	0.004823720895149592
0.0	0.0026414	0.007085716312585755
1.0	0.00445597662464807	0.008981375601177288
2.0	0.006847856294847406	0.011438363516096646
3.0	0.009806478002083736	0.014444198582858255
4.0	0.013308616784374998	0.017961062881949593
5.0	0.017317543377671517	0.021850895364885145
6.0	0.021801128930038563	0.02554771363947389
7.5	0.02962533815637025	0.030203973085777325
10.0	0.0467918212470009	0.051603854270714566
12.5	0.06759191118071334	0.07117912937004349
</tableData>
                  <tableData breakPoint="4.36871178058E7">
 	0.0	10.0
-5.0	0.0023264608105732117	0.006092301193227579
-2.5	6.593089183729332E-4	0.004823720895149592
0.0	0.0026414	0.007085716312585755
1.0	0.00445597662464807	0.008981375601177288
2.0	0.006847856294847406	0.011438363516096646
3.0	0.009806478002083736	0.014444198582858255
4.0	0.013308616784374998	0.017961062881949593
5.0	0.017317543377671517	0.021850895364885145
6.0	0.021801128930038563	0.02554771363947389
7.5	0.02962533815637025	0.030203973085777325
10.0	0.0467918212470009	0.051603854270714566
12.5	0.06759191118071334	0.07117912937004349
</tableData>
                  <tableData breakPoint="4.48073003136E7">
 	0.0	10.0
-5.0	0.0023264608105732117	0.006092301193227579
-2.5	6.593089183729332E-4	0.004823720895149592
0.0	0.0026414	0.007085716312585755
1.0	0.00445597662464807	0.008981375601177288
2.0	0.006847856294847406	0.011438363516096646
3.0	0.009806478002083736	0.014444198582858255
4.0	0.013308616784374998	0.017961062881949593
5.0	0.017317543377671517	0.021850895364885145
6.0	0.021801128930038563	0.02554771363947389
7.5	0.02962533815637025	0.030203973085777325
10.0	0.0467918212470009	0.051603854270714566
12.5	0.06759191118071334	0.07117912937004349
</tableData>
               </table>
            </product>
         </function>
         <function name="aero/function/drag_coeff_basic_M1">
            <product>
               <table>
                  <independentVar lookup="row">aero/alpha-deg</independentVar>
                  <independentVar lookup="column">aero/beta-deg</independentVar>
                  <independentVar lookup="table">aero/Re</independentVar>
                  <tableData breakPoint="201825.0784">
 	0.0	10.0
-5.0	0.0028495351398102834	0.0074616269809817115
-2.5	8.074952153037896E-4	0.005907817693603431
0.0	0.0032351	0.008678156391447707
1.0	0.00545731123039522	0.010999629092827238
2.0	0.0083875983809111	0.014009092483825758
3.0	0.012010386451976818	0.017690544043573574
4.0	0.016300341745452314	0.021997360568473578
5.0	0.02121033477086425	0.026762313830473953
6.0	0.026700650283316127	0.03128823240263976
7.5	0.03628591973130908	0.036998563185826214
10.0	0.05730256785353979	0.0631859069768049
12.5	0.08278075069578328	0.08716584948972701
</tableData>
                  <tableData breakPoint="3.36054752352E7">
 	0.0	10.0
-5.0	0.0028495351398102834	0.0074616269809817115
-2.5	8.074952153037896E-4	0.005907817693603431
0.0	0.0032351	0.008678156391447707
1.0	0.00545731123039522	0.010999629092827238
2.0	0.0083875983809111	0.014009092483825758
3.0	0.012010386451976818	0.017690544043573574
4.0	0.016300341745452314	0.021997360568473578
5.0	0.02121033477086425	0.026762313830473953
6.0	0.026700650283316127	0.03128823240263976
7.5	0.03628591973130908	0.036998563185826214
10.0	0.05730256785353979	0.0631859069768049
12.5	0.08278075069578328	0.08716584948972701
</tableData>
                  <tableData breakPoint="4.36871178058E7">
 	0.0	10.0
-5.0	0.0028495351398102834	0.0074616269809817115
-2.5	8.074952153037896E-4	0.005907817693603431
0.0	0.0032351	0.008678156391447707
1.0	0.00545731123039522	0.010999629092827238
2.0	0.0083875983809111	0.014009092483825758
3.0	0.012010386451976818	0.017690544043573574
4.0	0.016300341745452314	0.021997360568473578
5.0	0.02121033477086425	0.026762313830473953
6.0	0.026700650283316127	0.03128823240263976
7.5	0.03628591973130908	0.036998563185826214
10.0	0.05730256785353979	0.0631859069768049
12.5	0.08278075069578328	0.08716584948972701
</tableData>
                  <tableData breakPoint="4.48073003136E7">
 	0.0	10.0
-5.0	0.0028495351398102834	0.0074616269809817115
-2.5	8.074952153037896E-4	0.005907817693603431
0.0	0.0032351	0.008678156391447707
1.0	0.00545731123039522	0.010999629092827238
2.0	0.0083875983809111	0.014009092483825758
3.0	0.012010386451976818	0.017690544043573574
4.0	0.016300341745452314	0.021997360568473578
5.0	0.02121033477086425	0.026762313830473953
6.0	0.026700650283316127	0.03128823240263976
7.5	0.03628591973130908	0.036998563185826214
10.0	0.05730256785353979	0.0631859069768049
12.5	0.08278075069578328	0.08716584948972701
</tableData>
               </table>
            </product>
         </function>
         <function name="aero/function/drag_coeff_basic_M2">
            <product>
               <table>
                  <independentVar lookup="row">aero/alpha-deg</independentVar>
                  <independentVar lookup="column">aero/beta-deg</independentVar>
                  <independentVar lookup="table">aero/Re</independentVar>
                  <tableData breakPoint="201825.0784">
 	0.0	10.0
-5.0	0.003643478618292513	0.009537086413946141
-2.5	0.0010323140207493782	0.0075523173527814805
0.0	0.0041358	0.011094200129365447
1.0	0.006976620346788755	0.014061423584929775
2.0	0.010722006158570357	0.017909618762547517
3.0	0.015353540403465812	0.022615668448147244
4.0	0.020837478515978412	0.028120641171523124
5.0	0.027117604938862977	0.03420981766390321
6.0	0.034133869655736726	0.04000525427033745
7.5	0.04638577545932995	0.04730376244183949
10.0	0.07326181261251344	0.08079219356093856
12.5	0.10582271055578107	0.11141558135807329
</tableData>
                  <tableData breakPoint="3.36054752352E7">
 	0.0	10.0
-5.0	0.003643478618292513	0.009537086413946141
-2.5	0.0010323140207493782	0.0075523173527814805
0.0	0.0041358	0.011094200129365447
1.0	0.006976620346788755	0.014061423584929775
2.0	0.010722006158570357	0.017909618762547517
3.0	0.015353540403465812	0.022615668448147244
4.0	0.020837478515978412	0.028120641171523124
5.0	0.027117604938862977	0.03420981766390321
6.0	0.034133869655736726	0.04000525427033745
7.5	0.04638577545932995	0.04730376244183949
10.0	0.07326181261251344	0.08079219356093856
12.5	0.10582271055578107	0.11141558135807329
</tableData>
                  <tableData breakPoint="4.36871178058E7">
 	0.0	10.0
-5.0	0.003643478618292513	0.009537086413946141
-2.5	0.0010323140207493782	0.0075523173527814805
0.0	0.0041358	0.011094200129365447
1.0	0.006976620346788755	0.014061423584929775
2.0	0.010722006158570357	0.017909618762547517
3.0	0.015353540403465812	0.022615668448147244
4.0	0.020837478515978412	0.028120641171523124
5.0	0.027117604938862977	0.03420981766390321
6.0	0.034133869655736726	0.04000525427033745
7.5	0.04638577545932995	0.04730376244183949
10.0	0.07326181261251344	0.08079219356093856
12.5	0.10582271055578107	0.11141558135807329
</tableData>
                  <tableData breakPoint="4.48073003136E7">
 	0.0	10.0
-5.0	0.003643478618292513	0.009537086413946141
-2.5	0.0010323140207493782	0.0075523173527814805
0.0	0.0041358	0.011094200129365447
1.0	0.006976620346788755	0.014061423584929775
2.0	0.010722006158570357	0.017909618762547517
3.0	0.015353540403465812	0.022615668448147244
4.0	0.020837478515978412	0.028120641171523124
5.0	0.027117604938862977	0.03420981766390321
6.0	0.034133869655736726	0.04000525427033745
7.5	0.04638577545932995	0.04730376244183949
10.0	0.07326181261251344	0.08079219356093856
12.5	0.10582271055578107	0.11141558135807329
</tableData>
               </table>
            </product>
         </function>
         <function name="aero/function/drag_coeff_basic_M3">
            <product>
               <table>
                  <independentVar lookup="row">aero/alpha-deg</independentVar>
                  <independentVar lookup="column">aero/beta-deg</independentVar>
                  <independentVar lookup="table">aero/Re</independentVar>
                  <tableData breakPoint="201825.0784">
 	0.0	10.0
-5.0	0.0038006253544974264	0.009948277423651324
-2.5	0.001076712350490703	0.007878073657366615
0.0	0.0043135	0.01157072485379221
1.0	0.007276473148548417	0.01466702069571466
2.0	0.01118301504595012	0.018678211151175458
3.0	0.016013674149448282	0.023586153901448196
4.0	0.021732858907619834	0.029331857707881052
5.0	0.028278371181398032	0.03567997224508788
6.0	0.035604419010180174	0.041712145587390906
7.5	0.048376875435338085	0.04933347791093179
10.0	0.07640342380471965	0.08425796678034773
12.5	0.11038225492859283	0.11621746471157195
</tableData>
                  <tableData breakPoint="3.36054752352E7">
 	0.0	10.0
-5.0	0.0038006253544974264	0.009948277423651324
-2.5	0.001076712350490703	0.007878073657366615
0.0	0.0043135	0.01157072485379221
1.0	0.007276473148548417	0.01466702069571466
2.0	0.01118301504595012	0.018678211151175458
3.0	0.016013674149448282	0.023586153901448196
4.0	0.021732858907619834	0.029331857707881052
5.0	0.028278371181398032	0.03567997224508788
6.0	0.035604419010180174	0.041712145587390906
7.5	0.048376875435338085	0.04933347791093179
10.0	0.07640342380471965	0.08425796678034773
12.5	0.11038225492859283	0.11621746471157195
</tableData>
                  <tableData breakPoint="4.36871178058E7">
 	0.0	10.0
-5.0	0.0038006253544974264	0.009948277423651324
-2.5	0.001076712350490703	0.007878073657366615
0.0	0.0043135	0.01157072485379221
1.0	0.007276473148548417	0.01466702069571466
2.0	0.01118301504595012	0.018678211151175458
3.0	0.016013674149448282	0.023586153901448196
4.0	0.021732858907619834	0.029331857707881052
5.0	0.028278371181398032	0.03567997224508788
6.0	0.035604419010180174	0.041712145587390906
7.5	0.048376875435338085	0.04933347791093179
10.0	0.07640342380471965	0.08425796678034773
12.5	0.11038225492859283	0.11621746471157195
</tableData>
                  <tableData breakPoint="4.48073003136E7">
 	0.0	10.0
-5.0	0.0038006253544974264	0.009948277423651324
-2.5	0.001076712350490703	0.007878073657366615
0.0	0.0043135	0.01157072485379221
1.0	0.007276473148548417	0.01466702069571466
2.0	0.01118301504595012	0.018678211151175458
3.0	0.016013674149448282	0.023586153901448196
4.0	0.021732858907619834	0.029331857707881052
5.0	0.028278371181398032	0.03567997224508788
6.0	0.035604419010180174	0.041712145587390906
7.5	0.048376875435338085	0.04933347791093179
10.0	0.07640342380471965	0.08425796678034773
12.5	0.11038225492859283	0.11621746471157195
</tableData>
               </table>
            </product>
         </function>
      </axis>
      <axis name="SIDE">
         <function name="aero/forces/side_basic_Mach">
            <description>side force due to alpha beta Reynolds number and Mach number</description>
            <product>
               <property>aero/qbar-psf</property>
               <property>metrics/Sw-sqft</property>
               <property>aero/function/side_coeff_basic_Mach</property>
            </product>
         </function>
         <function name="aero/function/side_coeff_basic_Mach">
            <product>
               <interpolate1d>
                  <p>velocities/mach</p>
                  <v>0.200</v>
                  <p>aero/function/side_coeff_basic_M0</p>
                  <v>0.600</v>
                  <p>aero/function/side_coeff_basic_M1</p>
                  <v>0.780</v>
                  <p>aero/function/side_coeff_basic_M2</p>
                  <v>0.800</v>
                  <p>aero/function/side_coeff_basic_M3</p>
               </interpolate1d>
            </product>
         </function>
         <function name="aero/function/side_coeff_basic_M0">
            <product>
               <table>
                  <independentVar lookup="row">aero/alpha-deg</independentVar>
                  <independentVar lookup="column">aero/beta-deg</independentVar>
                  <independentVar lookup="table">aero/Re</independentVar>
                  <tableData breakPoint="201825.0784">
 	0.0	10.0
-5.0	-3.0561E-7	0.07718797678262192
-2.5	-3.0249E-7	0.0767973087924013
0.0	-2.9894E-7	0.07741657724928025
1.0	-2.9741E-7	0.0779645714403766
2.0	-2.9579E-7	0.07869932839159935
3.0	-2.9405E-7	0.07964441038237936
4.0	-2.9213E-7	0.08085230880458896
5.0	-2.8995E-7	0.08243703716004532
6.0	-2.8753E-7	0.08462035913972399
7.5	-2.8457E-7	0.08549481788735772
10.0	-2.8667E-7	0.08918517989042754
12.5	-2.9322E-7	0.08558060217307432
</tableData>
                  <tableData breakPoint="3.36054752352E7">
 	0.0	10.0
-5.0	-3.0561E-7	0.07718797678262192
-2.5	-3.0249E-7	0.0767973087924013
0.0	-2.9894E-7	0.07741657724928025
1.0	-2.9741E-7	0.0779645714403766
2.0	-2.9579E-7	0.07869932839159935
3.0	-2.9405E-7	0.07964441038237936
4.0	-2.9213E-7	0.08085230880458896
5.0	-2.8995E-7	0.08243703716004532
6.0	-2.8753E-7	0.08462035913972399
7.5	-2.8457E-7	0.08549481788735772
10.0	-2.8667E-7	0.08918517989042754
12.5	-2.9322E-7	0.08558060217307432
</tableData>
                  <tableData breakPoint="4.36871178058E7">
 	0.0	10.0
-5.0	-3.0561E-7	0.07718797678262192
-2.5	-3.0249E-7	0.0767973087924013
0.0	-2.9894E-7	0.07741657724928025
1.0	-2.9741E-7	0.0779645714403766
2.0	-2.9579E-7	0.07869932839159935
3.0	-2.9405E-7	0.07964441038237936
4.0	-2.9213E-7	0.08085230880458896
5.0	-2.8995E-7	0.08243703716004532
6.0	-2.8753E-7	0.08462035913972399
7.5	-2.8457E-7	0.08549481788735772
10.0	-2.8667E-7	0.08918517989042754
12.5	-2.9322E-7	0.08558060217307432
</tableData>
                  <tableData breakPoint="4.48073003136E7">
 	0.0	10.0
-5.0	-3.0561E-7	0.07718797678262192
-2.5	-3.0249E-7	0.0767973087924013
0.0	-2.9894E-7	0.07741657724928025
1.0	-2.9741E-7	0.0779645714403766
2.0	-2.9579E-7	0.07869932839159935
3.0	-2.9405E-7	0.07964441038237936
4.0	-2.9213E-7	0.08085230880458896
5.0	-2.8995E-7	0.08243703716004532
6.0	-2.8753E-7	0.08462035913972399
7.5	-2.8457E-7	0.08549481788735772
10.0	-2.8667E-7	0.08918517989042754
12.5	-2.9322E-7	0.08558060217307432
</tableData>
               </table>
            </product>
         </function>
         <function name="aero/function/side_coeff_basic_M1">
            <product>
               <table>
                  <independentVar lookup="row">aero/alpha-deg</independentVar>
                  <independentVar lookup="column">aero/beta-deg</independentVar>
                  <independentVar lookup="table">aero/Re</independentVar>
                  <tableData breakPoint="201825.0784">
 	0.0	10.0
-5.0	-3.743E-7	0.09453612435850095
-2.5	-3.7047E-7	0.09405699524602093
0.0	-3.6613E-7	0.0948155161611929
1.0	-3.6425E-7	0.09548630219041826
2.0	-3.6227E-7	0.09638622288573734
3.0	-3.6014E-7	0.0975448989933622
4.0	-3.5779E-7	0.0990237653738437
5.0	-3.5511E-7	0.10096795174626762
6.0	-3.5215E-7	0.10363620353554177
7.5	-3.4852E-7	0.10470988214397736
10.0	-3.511E-7	0.10922245662905994
12.5	-3.5912E-7	0.10481249543128868
</tableData>
                  <tableData breakPoint="3.36054752352E7">
 	0.0	10.0
-5.0	-3.743E-7	0.09453612435850095
-2.5	-3.7047E-7	0.09405699524602093
0.0	-3.6613E-7	0.0948155161611929
1.0	-3.6425E-7	0.09548630219041826
2.0	-3.6227E-7	0.09638622288573734
3.0	-3.6014E-7	0.0975448989933622
4.0	-3.5779E-7	0.0990237653738437
5.0	-3.5511E-7	0.10096795174626762
6.0	-3.5215E-7	0.10363620353554177
7.5	-3.4852E-7	0.10470988214397736
10.0	-3.511E-7	0.10922245662905994
12.5	-3.5912E-7	0.10481249543128868
</tableData>
                  <tableData breakPoint="4.36871178058E7">
 	0.0	10.0
-5.0	-3.743E-7	0.09453612435850095
-2.5	-3.7047E-7	0.09405699524602093
0.0	-3.6613E-7	0.0948155161611929
1.0	-3.6425E-7	0.09548630219041826
2.0	-3.6227E-7	0.09638622288573734
3.0	-3.6014E-7	0.0975448989933622
4.0	-3.5779E-7	0.0990237653738437
5.0	-3.5511E-7	0.10096795174626762
6.0	-3.5215E-7	0.10363620353554177
7.5	-3.4852E-7	0.10470988214397736
10.0	-3.511E-7	0.10922245662905994
12.5	-3.5912E-7	0.10481249543128868
</tableData>
                  <tableData breakPoint="4.48073003136E7">
 	0.0	10.0
-5.0	-3.743E-7	0.09453612435850095
-2.5	-3.7047E-7	0.09405699524602093
0.0	-3.6613E-7	0.0948155161611929
1.0	-3.6425E-7	0.09548630219041826
2.0	-3.6227E-7	0.09638622288573734
3.0	-3.6014E-7	0.0975448989933622
4.0	-3.5779E-7	0.0990237653738437
5.0	-3.5511E-7	0.10096795174626762
6.0	-3.5215E-7	0.10363620353554177
7.5	-3.4852E-7	0.10470988214397736
10.0	-3.511E-7	0.10922245662905994
12.5	-3.5912E-7	0.10481249543128868
</tableData>
               </table>
            </product>
         </function>
         <function name="aero/function/side_coeff_basic_M2">
            <product>
               <table>
                  <independentVar lookup="row">aero/alpha-deg</independentVar>
                  <independentVar lookup="column">aero/beta-deg</independentVar>
                  <independentVar lookup="table">aero/Re</independentVar>
                  <tableData breakPoint="201825.0784">
 	0.0	10.0
-5.0	-4.785E-7	0.12085029664110548
-2.5	-4.7362E-7	0.1202426973037293
0.0	-4.6806E-7	0.12121073480163758
1.0	-4.6566E-7	0.12206790246759311
2.0	-4.6313E-7	0.12322353755150867
3.0	-4.6041E-7	0.1247021895316488
4.0	-4.574E-7	0.12658888608921723
5.0	-4.5398E-7	0.1290747717584448
6.0	-4.5019E-7	0.13249167772143272
7.5	-4.4555E-7	0.13386447863146222
10.0	-4.4885E-7	0.13963580613417695
12.5	-4.5909E-7	0.13398602824938435
</tableData>
                  <tableData breakPoint="3.36054752352E7">
 	0.0	10.0
-5.0	-4.785E-7	0.12085029664110548
-2.5	-4.7362E-7	0.1202426973037293
0.0	-4.6806E-7	0.12121073480163758
1.0	-4.6566E-7	0.12206790246759311
2.0	-4.6313E-7	0.12322353755150867
3.0	-4.6041E-7	0.1247021895316488
4.0	-4.574E-7	0.12658888608921723
5.0	-4.5398E-7	0.1290747717584448
6.0	-4.5019E-7	0.13249167772143272
7.5	-4.4555E-7	0.13386447863146222
10.0	-4.4885E-7	0.13963580613417695
12.5	-4.5909E-7	0.13398602824938435
</tableData>
                  <tableData breakPoint="4.36871178058E7">
 	0.0	10.0
-5.0	-4.785E-7	0.12085029664110548
-2.5	-4.7362E-7	0.1202426973037293
0.0	-4.6806E-7	0.12121073480163758
1.0	-4.6566E-7	0.12206790246759311
2.0	-4.6313E-7	0.12322353755150867
3.0	-4.6041E-7	0.1247021895316488
4.0	-4.574E-7	0.12658888608921723
5.0	-4.5398E-7	0.1290747717584448
6.0	-4.5019E-7	0.13249167772143272
7.5	-4.4555E-7	0.13386447863146222
10.0	-4.4885E-7	0.13963580613417695
12.5	-4.5909E-7	0.13398602824938435
</tableData>
                  <tableData breakPoint="4.48073003136E7">
 	0.0	10.0
-5.0	-4.785E-7	0.12085029664110548
-2.5	-4.7362E-7	0.1202426973037293
0.0	-4.6806E-7	0.12121073480163758
1.0	-4.6566E-7	0.12206790246759311
2.0	-4.6313E-7	0.12322353755150867
3.0	-4.6041E-7	0.1247021895316488
4.0	-4.574E-7	0.12658888608921723
5.0	-4.5398E-7	0.1290747717584448
6.0	-4.5019E-7	0.13249167772143272
7.5	-4.4555E-7	0.13386447863146222
10.0	-4.4885E-7	0.13963580613417695
12.5	-4.5909E-7	0.13398602824938435
</tableData>
               </table>
            </product>
         </function>
         <function name="aero/function/side_coeff_basic_M3">
            <product>
               <table>
                  <independentVar lookup="row">aero/alpha-deg</independentVar>
                  <independentVar lookup="column">aero/beta-deg</independentVar>
                  <independentVar lookup="table">aero/Re</independentVar>
                  <tableData breakPoint="201825.0784">
 	0.0	10.0
-5.0	-4.9906E-7	0.12604679507186592
-2.5	-4.9397E-7	0.12541458940194683
0.0	-4.8817E-7	0.12641875332905333
1.0	-4.8567E-7	0.12731776371707104
2.0	-4.8302E-7	0.12851168115513978
3.0	-4.8019E-7	0.13005455799662383
4.0	-4.7705E-7	0.1320314113839373
5.0	-4.7348E-7	0.13462020615044806
6.0	-4.6953E-7	0.13818381596564977
7.5	-4.647E-7	0.13961353948370803
10.0	-4.6813E-7	0.1456380827136591
12.5	-4.7882E-7	0.13974680264763517
</tableData>
                  <tableData breakPoint="3.36054752352E7">
 	0.0	10.0
-5.0	-4.9906E-7	0.12604679507186592
-2.5	-4.9397E-7	0.12541458940194683
0.0	-4.8817E-7	0.12641875332905333
1.0	-4.8567E-7	0.12731776371707104
2.0	-4.8302E-7	0.12851168115513978
3.0	-4.8019E-7	0.13005455799662383
4.0	-4.7705E-7	0.1320314113839373
5.0	-4.7348E-7	0.13462020615044806
6.0	-4.6953E-7	0.13818381596564977
7.5	-4.647E-7	0.13961353948370803
10.0	-4.6813E-7	0.1456380827136591
12.5	-4.7882E-7	0.13974680264763517
</tableData>
                  <tableData breakPoint="4.36871178058E7">
 	0.0	10.0
-5.0	-4.9906E-7	0.12604679507186592
-2.5	-4.9397E-7	0.12541458940194683
0.0	-4.8817E-7	0.12641875332905333
1.0	-4.8567E-7	0.12731776371707104
2.0	-4.8302E-7	0.12851168115513978
3.0	-4.8019E-7	0.13005455799662383
4.0	-4.7705E-7	0.1320314113839373
5.0	-4.7348E-7	0.13462020615044806
6.0	-4.6953E-7	0.13818381596564977
7.5	-4.647E-7	0.13961353948370803
10.0	-4.6813E-7	0.1456380827136591
12.5	-4.7882E-7	0.13974680264763517
</tableData>
                  <tableData breakPoint="4.48073003136E7">
 	0.0	10.0
-5.0	-4.9906E-7	0.12604679507186592
-2.5	-4.9397E-7	0.12541458940194683
0.0	-4.8817E-7	0.12641875332905333
1.0	-4.8567E-7	0.12731776371707104
2.0	-4.8302E-7	0.12851168115513978
3.0	-4.8019E-7	0.13005455799662383
4.0	-4.7705E-7	0.1320314113839373
5.0	-4.7348E-7	0.13462020615044806
6.0	-4.6953E-7	0.13818381596564977
7.5	-4.647E-7	0.13961353948370803
10.0	-4.6813E-7	0.1456380827136591
12.5	-4.7882E-7	0.13974680264763517
</tableData>
               </table>
            </product>
         </function>
      </axis>
      <axis name="LIFT">
         <function name="aero/forces/lift_basic_Mach">
            <description>lift force due to alpha beta Reynolds number and Mach number</description>
            <product>
               <property>aero/qbar-psf</property>
               <property>metrics/Sw-sqft</property>
               <property>aero/function/lift_coeff_basic_Mach</property>
            </product>
         </function>
         <function name="aero/function/lift_coeff_basic_Mach">
            <product>
               <interpolate1d>
                  <p>velocities/mach</p>
                  <v>0.200</v>
                  <p>aero/function/lift_coeff_basic_M0</p>
                  <v>0.600</v>
                  <p>aero/function/lift_coeff_basic_M1</p>
                  <v>0.780</v>
                  <p>aero/function/lift_coeff_basic_M2</p>
                  <v>0.800</v>
                  <p>aero/function/lift_coeff_basic_M3</p>
               </interpolate1d>
            </product>
         </function>
         <function name="aero/function/lift_coeff_basic_M0">
            <product>
               <table>
                  <independentVar lookup="row">aero/alpha-deg</independentVar>
                  <independentVar lookup="column">aero/beta-deg</independentVar>
                  <independentVar lookup="table">aero/Re</independentVar>
                  <tableData breakPoint="201825.0784">
 	0.0	10.0
-5.0	-0.16825750618946209	-0.15008782661270295
-2.5	0.05797693985120424	0.07005515897627738
0.0	0.28312	0.28952
1.0	0.37261898416097994	0.3769145753513658
2.0	0.4616022088553793	0.4639618194629677
3.0	0.54989037424308	0.5504323683804139
4.0	0.6371336634045376	0.6357979437150783
5.0	0.7229316498309938	0.7184959389131065
6.0	0.8072031045612844	0.7937842934017113
7.5	0.9340339069729325	0.9143730592412356
10.0	1.1595914857674612	1.1531902710493405
12.5	1.387868456858552	1.3716918595636136
</tableData>
                  <tableData breakPoint="3.36054752352E7">
 	0.0	10.0
-5.0	-0.16825750618946209	-0.15008782661270295
-2.5	0.05797693985120424	0.07005515897627738
0.0	0.28312	0.28952
1.0	0.37261898416097994	0.3769145753513658
2.0	0.4616022088553793	0.4639618194629677
3.0	0.54989037424308	0.5504323683804139
4.0	0.6371336634045376	0.6357979437150783
5.0	0.7229316498309938	0.7184959389131065
6.0	0.8072031045612844	0.7937842934017113
7.5	0.9340339069729325	0.9143730592412356
10.0	1.1595914857674612	1.1531902710493405
12.5	1.387868456858552	1.3716918595636136
</tableData>
                  <tableData breakPoint="4.36871178058E7">
 	0.0	10.0
-5.0	-0.16825750618946209	-0.15008782661270295
-2.5	0.05797693985120424	0.07005515897627738
0.0	0.28312	0.28952
1.0	0.37261898416097994	0.3769145753513658
2.0	0.4616022088553793	0.4639618194629677
3.0	0.54989037424308	0.5504323683804139
4.0	0.6371336634045376	0.6357979437150783
5.0	0.7229316498309938	0.7184959389131065
6.0	0.8072031045612844	0.7937842934017113
7.5	0.9340339069729325	0.9143730592412356
10.0	1.1595914857674612	1.1531902710493405
12.5	1.387868456858552	1.3716918595636136
</tableData>
                  <tableData breakPoint="4.48073003136E7">
 	0.0	10.0
-5.0	-0.16825750618946209	-0.15008782661270295
-2.5	0.05797693985120424	0.07005515897627738
0.0	0.28312	0.28952
1.0	0.37261898416097994	0.3769145753513658
2.0	0.4616022088553793	0.4639618194629677
3.0	0.54989037424308	0.5504323683804139
4.0	0.6371336634045376	0.6357979437150783
5.0	0.7229316498309938	0.7184959389131065
6.0	0.8072031045612844	0.7937842934017113
7.5	0.9340339069729325	0.9143730592412356
10.0	1.1595914857674612	1.1531902710493405
12.5	1.387868456858552	1.3716918595636136
</tableData>
               </table>
            </product>
         </function>
         <function name="aero/function/lift_coeff_basic_M1">
            <product>
               <table>
                  <independentVar lookup="row">aero/alpha-deg</independentVar>
                  <independentVar lookup="column">aero/beta-deg</independentVar>
                  <independentVar lookup="table">aero/Re</independentVar>
                  <tableData breakPoint="201825.0784">
 	0.0	10.0
-5.0	-0.20607582738760746	-0.18382051987775685
-2.5	0.0710068051913143	0.08579957977748207
0.0	0.34675	0.35458
1.0	0.45635426175081856	0.46162707188635244
2.0	0.5653516740024749	0.5682353813096949
3.0	0.6734743981966012	0.6741369645048239
4.0	0.7803237751363093	0.7786951973207559
5.0	0.885410652364149	0.8799802798687149
6.0	0.9886147571377074	0.9721800192086881
7.5	1.1439503912448534	1.119844920791423
10.0	1.4201243940646153	1.412261355629096
12.5	1.6997744067123268	1.6799415309449375
</tableData>
                  <tableData breakPoint="3.36054752352E7">
 	0.0	10.0
-5.0	-0.20607582738760746	-0.18382051987775685
-2.5	0.0710068051913143	0.08579957977748207
0.0	0.34675	0.35458
1.0	0.45635426175081856	0.46162707188635244
2.0	0.5653516740024749	0.5682353813096949
3.0	0.6734743981966012	0.6741369645048239
4.0	0.7803237751363093	0.7786951973207559
5.0	0.885410652364149	0.8799802798687149
6.0	0.9886147571377074	0.9721800192086881
7.5	1.1439503912448534	1.119844920791423
10.0	1.4201243940646153	1.412261355629096
12.5	1.6997744067123268	1.6799415309449375
</tableData>
                  <tableData breakPoint="4.36871178058E7">
 	0.0	10.0
-5.0	-0.20607582738760746	-0.18382051987775685
-2.5	0.0710068051913143	0.08579957977748207
0.0	0.34675	0.35458
1.0	0.45635426175081856	0.46162707188635244
2.0	0.5653516740024749	0.5682353813096949
3.0	0.6734743981966012	0.6741369645048239
4.0	0.7803237751363093	0.7786951973207559
5.0	0.885410652364149	0.8799802798687149
6.0	0.9886147571377074	0.9721800192086881
7.5	1.1439503912448534	1.119844920791423
10.0	1.4201243940646153	1.412261355629096
12.5	1.6997744067123268	1.6799415309449375
</tableData>
                  <tableData breakPoint="4.48073003136E7">
 	0.0	10.0
-5.0	-0.20607582738760746	-0.18382051987775685
-2.5	0.0710068051913143	0.08579957977748207
0.0	0.34675	0.35458
1.0	0.45635426175081856	0.46162707188635244
2.0	0.5653516740024749	0.5682353813096949
3.0	0.6734743981966012	0.6741369645048239
4.0	0.7803237751363093	0.7786951973207559
5.0	0.885410652364149	0.8799802798687149
6.0	0.9886147571377074	0.9721800192086881
7.5	1.1439503912448534	1.119844920791423
10.0	1.4201243940646153	1.412261355629096
12.5	1.6997744067123268	1.6799415309449375
</tableData>
               </table>
            </product>
         </function>
         <function name="aero/function/lift_coeff_basic_M2">
            <product>
               <table>
                  <independentVar lookup="row">aero/alpha-deg</independentVar>
                  <independentVar lookup="column">aero/beta-deg</independentVar>
                  <independentVar lookup="table">aero/Re</independentVar>
                  <tableData breakPoint="201825.0784">
 	0.0	10.0
-5.0	-0.2634549756363657	-0.23498946939492205
-2.5	0.09077542699746757	0.10969042370873178
0.0	0.44329	0.4533
1.0	0.5834070969128047	0.5901463724788955
2.0	0.72274608476832	0.7264321669195258
3.0	0.8609663822856727	0.861826696555653
4.0	0.9975664727671515	0.9954809584450854
5.0	1.1319439334098573	1.1249348307426568
6.0	1.2638555721229878	1.2428854233864253
7.5	1.4624569634129534	1.4317064789642235
10.0	1.815560665803467	1.8055074965145157
12.5	2.1730046603794086	2.14759298389684
</tableData>
                  <tableData breakPoint="3.36054752352E7">
 	0.0	10.0
-5.0	-0.2634549756363657	-0.23498946939492205
-2.5	0.09077542699746757	0.10969042370873178
0.0	0.44329	0.4533
1.0	0.5834070969128047	0.5901463724788955
2.0	0.72274608476832	0.7264321669195258
3.0	0.8609663822856727	0.861826696555653
4.0	0.9975664727671515	0.9954809584450854
5.0	1.1319439334098573	1.1249348307426568
6.0	1.2638555721229878	1.2428854233864253
7.5	1.4624569634129534	1.4317064789642235
10.0	1.815560665803467	1.8055074965145157
12.5	2.1730046603794086	2.14759298389684
</tableData>
                  <tableData breakPoint="4.36871178058E7">
 	0.0	10.0
-5.0	-0.2634549756363657	-0.23498946939492205
-2.5	0.09077542699746757	0.10969042370873178
0.0	0.44329	0.4533
1.0	0.5834070969128047	0.5901463724788955
2.0	0.72274608476832	0.7264321669195258
3.0	0.8609663822856727	0.861826696555653
4.0	0.9975664727671515	0.9954809584450854
5.0	1.1319439334098573	1.1249348307426568
6.0	1.2638555721229878	1.2428854233864253
7.5	1.4624569634129534	1.4317064789642235
10.0	1.815560665803467	1.8055074965145157
12.5	2.1730046603794086	2.14759298389684
</tableData>
                  <tableData breakPoint="4.48073003136E7">
 	0.0	10.0
-5.0	-0.2634549756363657	-0.23498946939492205
-2.5	0.09077542699746757	0.10969042370873178
0.0	0.44329	0.4533
1.0	0.5834070969128047	0.5901463724788955
2.0	0.72274608476832	0.7264321669195258
3.0	0.8609663822856727	0.861826696555653
4.0	0.9975664727671515	0.9954809584450854
5.0	1.1319439334098573	1.1249348307426568
6.0	1.2638555721229878	1.2428854233864253
7.5	1.4624569634129534	1.4317064789642235
10.0	1.815560665803467	1.8055074965145157
12.5	2.1730046603794086	2.14759298389684
</tableData>
               </table>
            </product>
         </function>
         <function name="aero/function/lift_coeff_basic_M3">
            <product>
               <table>
                  <independentVar lookup="row">aero/alpha-deg</independentVar>
                  <independentVar lookup="column">aero/beta-deg</independentVar>
                  <independentVar lookup="table">aero/Re</independentVar>
                  <tableData breakPoint="201825.0784">
 	0.0	10.0
-5.0	-0.2747743530443021	-0.24509405555559005
-2.5	0.09467607617911877	0.11439810763901397
0.0	0.46234	0.47278
1.0	0.6084756818267419	0.6155060895233182
2.0	0.7537989123337085	0.7576471750795932
3.0	0.8979625354970191	0.8988559784273011
4.0	1.0404183993277423	1.0382868415501902
5.0	1.1805276416434847	1.1732738042831026
6.0	1.3181995599100111	1.2962004537926959
7.5	1.5252341401644254	1.493193527553937
10.0	1.8934991920861535	1.8830473889366361
12.5	2.26643240494767	2.2399227627252962
</tableData>
                  <tableData breakPoint="3.36054752352E7">
 	0.0	10.0
-5.0	-0.2747743530443021	-0.24509405555559005
-2.5	0.09467607617911877	0.11439810763901397
0.0	0.46234	0.47278
1.0	0.6084756818267419	0.6155060895233182
2.0	0.7537989123337085	0.7576471750795932
3.0	0.8979625354970191	0.8988559784273011
4.0	1.0404183993277423	1.0382868415501902
5.0	1.1805276416434847	1.1732738042831026
6.0	1.3181995599100111	1.2962004537926959
7.5	1.5252341401644254	1.493193527553937
10.0	1.8934991920861535	1.8830473889366361
12.5	2.26643240494767	2.2399227627252962
</tableData>
                  <tableData breakPoint="4.36871178058E7">
 	0.0	10.0
-5.0	-0.2747743530443021	-0.24509405555559005
-2.5	0.09467607617911877	0.11439810763901397
0.0	0.46234	0.47278
1.0	0.6084756818267419	0.6155060895233182
2.0	0.7537989123337085	0.7576471750795932
3.0	0.8979625354970191	0.8988559784273011
4.0	1.0404183993277423	1.0382868415501902
5.0	1.1805276416434847	1.1732738042831026
6.0	1.3181995599100111	1.2962004537926959
7.5	1.5252341401644254	1.493193527553937
10.0	1.8934991920861535	1.8830473889366361
12.5	2.26643240494767	2.2399227627252962
</tableData>
                  <tableData breakPoint="4.48073003136E7">
 	0.0	10.0
-5.0	-0.2747743530443021	-0.24509405555559005
-2.5	0.09467607617911877	0.11439810763901397
0.0	0.46234	0.47278
1.0	0.6084756818267419	0.6155060895233182
2.0	0.7537989123337085	0.7576471750795932
3.0	0.8979625354970191	0.8988559784273011
4.0	1.0404183993277423	1.0382868415501902
5.0	1.1805276416434847	1.1732738042831026
6.0	1.3181995599100111	1.2962004537926959
7.5	1.5252341401644254	1.493193527553937
10.0	1.8934991920861535	1.8830473889366361
12.5	2.26643240494767	2.2399227627252962
</tableData>
               </table>
            </product>
         </function>
      </axis>
      <axis name="ROLL">
         <function name="aero/forces/roll_basic_Mach">
            <description>roll force due to alpha beta Reynolds number and Mach number</description>
            <product>
               <property>aero/qbar-psf</property>
               <property>metrics/Sw-sqft</property>
               <property>aero/function/roll_coeff_basic_Mach</property>
            </product>
         </function>
         <function name="aero/function/roll_coeff_basic_Mach">
            <product>
               <interpolate1d>
                  <p>velocities/mach</p>
                  <v>0.200</v>
                  <p>aero/function/roll_coeff_basic_M0</p>
                  <v>0.600</v>
                  <p>aero/function/roll_coeff_basic_M1</p>
                  <v>0.780</v>
                  <p>aero/function/roll_coeff_basic_M2</p>
                  <v>0.800</v>
                  <p>aero/function/roll_coeff_basic_M3</p>
               </interpolate1d>
            </product>
         </function>
         <function name="aero/function/roll_coeff_basic_M0">
            <product>
               <table>
                  <independentVar lookup="row">aero/alpha-deg</independentVar>
                  <independentVar lookup="column">aero/beta-deg</independentVar>
                  <independentVar lookup="table">aero/Re</independentVar>
                  <tableData breakPoint="201825.0784">
 	0.0	10.0
-5.0	1.4073E-7	-0.040397
-2.5	1.3971E-7	-0.039853
0.0	1.3846E-7	-0.039544
1.0	1.379E-7	-0.039495
2.0	1.3728E-7	-0.039498
3.0	1.366E-7	-0.039567
4.0	1.3582E-7	-0.039736
5.0	1.3489E-7	-0.040087
6.0	1.3382E-7	-0.040802
7.5	1.3252E-7	-0.040748
10.0	1.3399E-7	-0.040211
12.5	1.3777E-7	-0.035925
</tableData>
                  <tableData breakPoint="3.36054752352E7">
 	0.0	10.0
-5.0	1.4073E-7	-0.040397
-2.5	1.3971E-7	-0.039853
0.0	1.3846E-7	-0.039544
1.0	1.379E-7	-0.039495
2.0	1.3728E-7	-0.039498
3.0	1.366E-7	-0.039567
4.0	1.3582E-7	-0.039736
5.0	1.3489E-7	-0.040087
6.0	1.3382E-7	-0.040802
7.5	1.3252E-7	-0.040748
10.0	1.3399E-7	-0.040211
12.5	1.3777E-7	-0.035925
</tableData>
                  <tableData breakPoint="4.36871178058E7">
 	0.0	10.0
-5.0	1.4073E-7	-0.040397
-2.5	1.3971E-7	-0.039853
0.0	1.3846E-7	-0.039544
1.0	1.379E-7	-0.039495
2.0	1.3728E-7	-0.039498
3.0	1.366E-7	-0.039567
4.0	1.3582E-7	-0.039736
5.0	1.3489E-7	-0.040087
6.0	1.3382E-7	-0.040802
7.5	1.3252E-7	-0.040748
10.0	1.3399E-7	-0.040211
12.5	1.3777E-7	-0.035925
</tableData>
                  <tableData breakPoint="4.48073003136E7">
 	0.0	10.0
-5.0	1.4073E-7	-0.040397
-2.5	1.3971E-7	-0.039853
0.0	1.3846E-7	-0.039544
1.0	1.379E-7	-0.039495
2.0	1.3728E-7	-0.039498
3.0	1.366E-7	-0.039567
4.0	1.3582E-7	-0.039736
5.0	1.3489E-7	-0.040087
6.0	1.3382E-7	-0.040802
7.5	1.3252E-7	-0.040748
10.0	1.3399E-7	-0.040211
12.5	1.3777E-7	-0.035925
</tableData>
               </table>
            </product>
         </function>
         <function name="aero/function/roll_coeff_basic_M1">
            <product>
               <table>
                  <independentVar lookup="row">aero/alpha-deg</independentVar>
                  <independentVar lookup="column">aero/beta-deg</independentVar>
                  <independentVar lookup="table">aero/Re</independentVar>
                  <tableData breakPoint="201825.0784">
 	0.0	10.0
-5.0	1.7236E-7	-0.049476
-2.5	1.7111E-7	-0.048809
0.0	1.6958E-7	-0.048431
1.0	1.6889E-7	-0.048371
2.0	1.6814E-7	-0.048375
3.0	1.6731E-7	-0.04846
4.0	1.6634E-7	-0.048667
5.0	1.652E-7	-0.049096
6.0	1.6389E-7	-0.049972
7.5	1.623E-7	-0.049906
10.0	1.641E-7	-0.049248
12.5	1.6874E-7	-0.043999
</tableData>
                  <tableData breakPoint="3.36054752352E7">
 	0.0	10.0
-5.0	1.7236E-7	-0.049476
-2.5	1.7111E-7	-0.048809
0.0	1.6958E-7	-0.048431
1.0	1.6889E-7	-0.048371
2.0	1.6814E-7	-0.048375
3.0	1.6731E-7	-0.04846
4.0	1.6634E-7	-0.048667
5.0	1.652E-7	-0.049096
6.0	1.6389E-7	-0.049972
7.5	1.623E-7	-0.049906
10.0	1.641E-7	-0.049248
12.5	1.6874E-7	-0.043999
</tableData>
                  <tableData breakPoint="4.36871178058E7">
 	0.0	10.0
-5.0	1.7236E-7	-0.049476
-2.5	1.7111E-7	-0.048809
0.0	1.6958E-7	-0.048431
1.0	1.6889E-7	-0.048371
2.0	1.6814E-7	-0.048375
3.0	1.6731E-7	-0.04846
4.0	1.6634E-7	-0.048667
5.0	1.652E-7	-0.049096
6.0	1.6389E-7	-0.049972
7.5	1.623E-7	-0.049906
10.0	1.641E-7	-0.049248
12.5	1.6874E-7	-0.043999
</tableData>
                  <tableData breakPoint="4.48073003136E7">
 	0.0	10.0
-5.0	1.7236E-7	-0.049476
-2.5	1.7111E-7	-0.048809
0.0	1.6958E-7	-0.048431
1.0	1.6889E-7	-0.048371
2.0	1.6814E-7	-0.048375
3.0	1.6731E-7	-0.04846
4.0	1.6634E-7	-0.048667
5.0	1.652E-7	-0.049096
6.0	1.6389E-7	-0.049972
7.5	1.623E-7	-0.049906
10.0	1.641E-7	-0.049248
12.5	1.6874E-7	-0.043999
</tableData>
               </table>
            </product>
         </function>
         <function name="aero/function/roll_coeff_basic_M2">
            <product>
               <table>
                  <independentVar lookup="row">aero/alpha-deg</independentVar>
                  <independentVar lookup="column">aero/beta-deg</independentVar>
                  <independentVar lookup="table">aero/Re</independentVar>
                  <tableData breakPoint="201825.0784">
 	0.0	10.0
-5.0	2.2035E-7	-0.063251
-2.5	2.1875E-7	-0.062398
0.0	2.1679E-7	-0.061914
1.0	2.1591E-7	-0.061838
2.0	2.1495E-7	-0.061843
3.0	2.1388E-7	-0.061951
4.0	2.1266E-7	-0.062216
5.0	2.112E-7	-0.062765
6.0	2.0952E-7	-0.063885
7.5	2.0749E-7	-0.0638
10.0	2.0979E-7	-0.062959
12.5	2.1572E-7	-0.056249
</tableData>
                  <tableData breakPoint="3.36054752352E7">
 	0.0	10.0
-5.0	2.2035E-7	-0.063251
-2.5	2.1875E-7	-0.062398
0.0	2.1679E-7	-0.061914
1.0	2.1591E-7	-0.061838
2.0	2.1495E-7	-0.061843
3.0	2.1388E-7	-0.061951
4.0	2.1266E-7	-0.062216
5.0	2.112E-7	-0.062765
6.0	2.0952E-7	-0.063885
7.5	2.0749E-7	-0.0638
10.0	2.0979E-7	-0.062959
12.5	2.1572E-7	-0.056249
</tableData>
                  <tableData breakPoint="4.36871178058E7">
 	0.0	10.0
-5.0	2.2035E-7	-0.063251
-2.5	2.1875E-7	-0.062398
0.0	2.1679E-7	-0.061914
1.0	2.1591E-7	-0.061838
2.0	2.1495E-7	-0.061843
3.0	2.1388E-7	-0.061951
4.0	2.1266E-7	-0.062216
5.0	2.112E-7	-0.062765
6.0	2.0952E-7	-0.063885
7.5	2.0749E-7	-0.0638
10.0	2.0979E-7	-0.062959
12.5	2.1572E-7	-0.056249
</tableData>
                  <tableData breakPoint="4.48073003136E7">
 	0.0	10.0
-5.0	2.2035E-7	-0.063251
-2.5	2.1875E-7	-0.062398
0.0	2.1679E-7	-0.061914
1.0	2.1591E-7	-0.061838
2.0	2.1495E-7	-0.061843
3.0	2.1388E-7	-0.061951
4.0	2.1266E-7	-0.062216
5.0	2.112E-7	-0.062765
6.0	2.0952E-7	-0.063885
7.5	2.0749E-7	-0.0638
10.0	2.0979E-7	-0.062959
12.5	2.1572E-7	-0.056249
</tableData>
               </table>
            </product>
         </function>
         <function name="aero/function/roll_coeff_basic_M3">
            <product>
               <table>
                  <independentVar lookup="row">aero/alpha-deg</independentVar>
                  <independentVar lookup="column">aero/beta-deg</independentVar>
                  <independentVar lookup="table">aero/Re</independentVar>
                  <tableData breakPoint="201825.0784">
 	0.0	10.0
-5.0	2.2981E-7	-0.065969
-2.5	2.2815E-7	-0.065079
0.0	2.2611E-7	-0.064575
1.0	2.2518E-7	-0.064495
2.0	2.2418E-7	-0.0645
3.0	2.2307E-7	-0.064613
4.0	2.2179E-7	-0.064889
5.0	2.2027E-7	-0.065462
6.0	2.1852E-7	-0.066629
7.5	2.1641E-7	-0.066541
10.0	2.188E-7	-0.065664
12.5	2.2499E-7	-0.058665
</tableData>
                  <tableData breakPoint="3.36054752352E7">
 	0.0	10.0
-5.0	2.2981E-7	-0.065969
-2.5	2.2815E-7	-0.065079
0.0	2.2611E-7	-0.064575
1.0	2.2518E-7	-0.064495
2.0	2.2418E-7	-0.0645
3.0	2.2307E-7	-0.064613
4.0	2.2179E-7	-0.064889
5.0	2.2027E-7	-0.065462
6.0	2.1852E-7	-0.066629
7.5	2.1641E-7	-0.066541
10.0	2.188E-7	-0.065664
12.5	2.2499E-7	-0.058665
</tableData>
                  <tableData breakPoint="4.36871178058E7">
 	0.0	10.0
-5.0	2.2981E-7	-0.065969
-2.5	2.2815E-7	-0.065079
0.0	2.2611E-7	-0.064575
1.0	2.2518E-7	-0.064495
2.0	2.2418E-7	-0.0645
3.0	2.2307E-7	-0.064613
4.0	2.2179E-7	-0.064889
5.0	2.2027E-7	-0.065462
6.0	2.1852E-7	-0.066629
7.5	2.1641E-7	-0.066541
10.0	2.188E-7	-0.065664
12.5	2.2499E-7	-0.058665
</tableData>
                  <tableData breakPoint="4.48073003136E7">
 	0.0	10.0
-5.0	2.2981E-7	-0.065969
-2.5	2.2815E-7	-0.065079
0.0	2.2611E-7	-0.064575
1.0	2.2518E-7	-0.064495
2.0	2.2418E-7	-0.0645
3.0	2.2307E-7	-0.064613
4.0	2.2179E-7	-0.064889
5.0	2.2027E-7	-0.065462
6.0	2.1852E-7	-0.066629
7.5	2.1641E-7	-0.066541
10.0	2.188E-7	-0.065664
12.5	2.2499E-7	-0.058665
</tableData>
               </table>
            </product>
         </function>
      </axis>
      <axis name="PITCH">
         <function name="aero/forces/pitch_basic_Mach">
            <description>pitch force due to alpha beta Reynolds number and Mach number</description>
            <product>
               <property>aero/qbar-psf</property>
               <property>metrics/Sw-sqft</property>
               <property>aero/function/pitch_coeff_basic_Mach</property>
            </product>
         </function>
         <function name="aero/function/pitch_coeff_basic_Mach">
            <product>
               <interpolate1d>
                  <p>velocities/mach</p>
                  <v>0.200</v>
                  <p>aero/function/pitch_coeff_basic_M0</p>
                  <v>0.600</v>
                  <p>aero/function/pitch_coeff_basic_M1</p>
                  <v>0.780</v>
                  <p>aero/function/pitch_coeff_basic_M2</p>
                  <v>0.800</v>
                  <p>aero/function/pitch_coeff_basic_M3</p>
               </interpolate1d>
            </product>
         </function>
         <function name="aero/function/pitch_coeff_basic_M0">
            <product>
               <table>
                  <independentVar lookup="row">aero/alpha-deg</independentVar>
                  <independentVar lookup="column">aero/beta-deg</independentVar>
                  <independentVar lookup="table">aero/Re</independentVar>
                  <tableData breakPoint="201825.0784">
 	0.0	10.0
-5.0	0.18942	0.15166
-2.5	0.067956	0.030608
0.0	-0.046446	-0.085114
1.0	-0.089617	-0.12955
2.0	-0.13079	-0.17257
3.0	-0.1693	-0.21347
4.0	-0.20398	-0.25032
5.0	-0.23339	-0.27721
6.0	-0.2573	-0.27561
7.5	-0.29595	-0.3074
10.0	-0.41839	-0.50048
12.5	-0.55694	-0.62374
</tableData>
                  <tableData breakPoint="3.36054752352E7">
 	0.0	10.0
-5.0	0.18942	0.15166
-2.5	0.067956	0.030608
0.0	-0.046446	-0.085114
1.0	-0.089617	-0.12955
2.0	-0.13079	-0.17257
3.0	-0.1693	-0.21347
4.0	-0.20398	-0.25032
5.0	-0.23339	-0.27721
6.0	-0.2573	-0.27561
7.5	-0.29595	-0.3074
10.0	-0.41839	-0.50048
12.5	-0.55694	-0.62374
</tableData>
                  <tableData breakPoint="4.36871178058E7">
 	0.0	10.0
-5.0	0.18942	0.15166
-2.5	0.067956	0.030608
0.0	-0.046446	-0.085114
1.0	-0.089617	-0.12955
2.0	-0.13079	-0.17257
3.0	-0.1693	-0.21347
4.0	-0.20398	-0.25032
5.0	-0.23339	-0.27721
6.0	-0.2573	-0.27561
7.5	-0.29595	-0.3074
10.0	-0.41839	-0.50048
12.5	-0.55694	-0.62374
</tableData>
                  <tableData breakPoint="4.48073003136E7">
 	0.0	10.0
-5.0	0.18942	0.15166
-2.5	0.067956	0.030608
0.0	-0.046446	-0.085114
1.0	-0.089617	-0.12955
2.0	-0.13079	-0.17257
3.0	-0.1693	-0.21347
4.0	-0.20398	-0.25032
5.0	-0.23339	-0.27721
6.0	-0.2573	-0.27561
7.5	-0.29595	-0.3074
10.0	-0.41839	-0.50048
12.5	-0.55694	-0.62374
</tableData>
               </table>
            </product>
         </function>
         <function name="aero/function/pitch_coeff_basic_M1">
            <product>
               <table>
                  <independentVar lookup="row">aero/alpha-deg</independentVar>
                  <independentVar lookup="column">aero/beta-deg</independentVar>
                  <independentVar lookup="table">aero/Re</independentVar>
                  <tableData breakPoint="201825.0784">
 	0.0	10.0
-5.0	0.23199	0.18575
-2.5	0.083229	0.037487
0.0	-0.056885	-0.10424
1.0	-0.10976	-0.15867
2.0	-0.16019	-0.21135
3.0	-0.20734	-0.26144
4.0	-0.24982	-0.30658
5.0	-0.28584	-0.33951
6.0	-0.31512	-0.33755
7.5	-0.36247	-0.37648
10.0	-0.51242	-0.61296
12.5	-0.68211	-0.76393
</tableData>
                  <tableData breakPoint="3.36054752352E7">
 	0.0	10.0
-5.0	0.23199	0.18575
-2.5	0.083229	0.037487
0.0	-0.056885	-0.10424
1.0	-0.10976	-0.15867
2.0	-0.16019	-0.21135
3.0	-0.20734	-0.26144
4.0	-0.24982	-0.30658
5.0	-0.28584	-0.33951
6.0	-0.31512	-0.33755
7.5	-0.36247	-0.37648
10.0	-0.51242	-0.61296
12.5	-0.68211	-0.76393
</tableData>
                  <tableData breakPoint="4.36871178058E7">
 	0.0	10.0
-5.0	0.23199	0.18575
-2.5	0.083229	0.037487
0.0	-0.056885	-0.10424
1.0	-0.10976	-0.15867
2.0	-0.16019	-0.21135
3.0	-0.20734	-0.26144
4.0	-0.24982	-0.30658
5.0	-0.28584	-0.33951
6.0	-0.31512	-0.33755
7.5	-0.36247	-0.37648
10.0	-0.51242	-0.61296
12.5	-0.68211	-0.76393
</tableData>
                  <tableData breakPoint="4.48073003136E7">
 	0.0	10.0
-5.0	0.23199	0.18575
-2.5	0.083229	0.037487
0.0	-0.056885	-0.10424
1.0	-0.10976	-0.15867
2.0	-0.16019	-0.21135
3.0	-0.20734	-0.26144
4.0	-0.24982	-0.30658
5.0	-0.28584	-0.33951
6.0	-0.31512	-0.33755
7.5	-0.36247	-0.37648
10.0	-0.51242	-0.61296
12.5	-0.68211	-0.76393
</tableData>
               </table>
            </product>
         </function>
         <function name="aero/function/pitch_coeff_basic_M2">
            <product>
               <table>
                  <independentVar lookup="row">aero/alpha-deg</independentVar>
                  <independentVar lookup="column">aero/beta-deg</independentVar>
                  <independentVar lookup="table">aero/Re</independentVar>
                  <tableData breakPoint="201825.0784">
 	0.0	10.0
-5.0	0.29658	0.23746
-2.5	0.1064	0.047924
0.0	-0.072722	-0.13327
1.0	-0.14032	-0.20284
2.0	-0.20479	-0.2702
3.0	-0.26507	-0.33423
4.0	-0.31938	-0.39193
5.0	-0.36542	-0.43404
6.0	-0.40286	-0.43153
7.5	-0.46338	-0.4813
10.0	-0.65508	-0.78361
12.5	-0.87201	-0.97661
</tableData>
                  <tableData breakPoint="3.36054752352E7">
 	0.0	10.0
-5.0	0.29658	0.23746
-2.5	0.1064	0.047924
0.0	-0.072722	-0.13327
1.0	-0.14032	-0.20284
2.0	-0.20479	-0.2702
3.0	-0.26507	-0.33423
4.0	-0.31938	-0.39193
5.0	-0.36542	-0.43404
6.0	-0.40286	-0.43153
7.5	-0.46338	-0.4813
10.0	-0.65508	-0.78361
12.5	-0.87201	-0.97661
</tableData>
                  <tableData breakPoint="4.36871178058E7">
 	0.0	10.0
-5.0	0.29658	0.23746
-2.5	0.1064	0.047924
0.0	-0.072722	-0.13327
1.0	-0.14032	-0.20284
2.0	-0.20479	-0.2702
3.0	-0.26507	-0.33423
4.0	-0.31938	-0.39193
5.0	-0.36542	-0.43404
6.0	-0.40286	-0.43153
7.5	-0.46338	-0.4813
10.0	-0.65508	-0.78361
12.5	-0.87201	-0.97661
</tableData>
                  <tableData breakPoint="4.48073003136E7">
 	0.0	10.0
-5.0	0.29658	0.23746
-2.5	0.1064	0.047924
0.0	-0.072722	-0.13327
1.0	-0.14032	-0.20284
2.0	-0.20479	-0.2702
3.0	-0.26507	-0.33423
4.0	-0.31938	-0.39193
5.0	-0.36542	-0.43404
6.0	-0.40286	-0.43153
7.5	-0.46338	-0.4813
10.0	-0.65508	-0.78361
12.5	-0.87201	-0.97661
</tableData>
               </table>
            </product>
         </function>
         <function name="aero/function/pitch_coeff_basic_M3">
            <product>
               <table>
                  <independentVar lookup="row">aero/alpha-deg</independentVar>
                  <independentVar lookup="column">aero/beta-deg</independentVar>
                  <independentVar lookup="table">aero/Re</independentVar>
                  <tableData breakPoint="201825.0784">
 	0.0	10.0
-5.0	0.30933	0.24766
-2.5	0.11097	0.049983
0.0	-0.075847	-0.13899
1.0	-0.14634	-0.21156
2.0	-0.21359	-0.2818
3.0	-0.27646	-0.34859
4.0	-0.3331	-0.40877
5.0	-0.38112	-0.45269
6.0	-0.42017	-0.45007
7.5	-0.48329	-0.50198
10.0	-0.68322	-0.81728
12.5	-0.90948	-1.0186
</tableData>
                  <tableData breakPoint="3.36054752352E7">
 	0.0	10.0
-5.0	0.30933	0.24766
-2.5	0.11097	0.049983
0.0	-0.075847	-0.13899
1.0	-0.14634	-0.21156
2.0	-0.21359	-0.2818
3.0	-0.27646	-0.34859
4.0	-0.3331	-0.40877
5.0	-0.38112	-0.45269
6.0	-0.42017	-0.45007
7.5	-0.48329	-0.50198
10.0	-0.68322	-0.81728
12.5	-0.90948	-1.0186
</tableData>
                  <tableData breakPoint="4.36871178058E7">
 	0.0	10.0
-5.0	0.30933	0.24766
-2.5	0.11097	0.049983
0.0	-0.075847	-0.13899
1.0	-0.14634	-0.21156
2.0	-0.21359	-0.2818
3.0	-0.27646	-0.34859
4.0	-0.3331	-0.40877
5.0	-0.38112	-0.45269
6.0	-0.42017	-0.45007
7.5	-0.48329	-0.50198
10.0	-0.68322	-0.81728
12.5	-0.90948	-1.0186
</tableData>
                  <tableData breakPoint="4.48073003136E7">
 	0.0	10.0
-5.0	0.30933	0.24766
-2.5	0.11097	0.049983
0.0	-0.075847	-0.13899
1.0	-0.14634	-0.21156
2.0	-0.21359	-0.2818
3.0	-0.27646	-0.34859
4.0	-0.3331	-0.40877
5.0	-0.38112	-0.45269
6.0	-0.42017	-0.45007
7.5	-0.48329	-0.50198
10.0	-0.68322	-0.81728
12.5	-0.90948	-1.0186
</tableData>
               </table>
            </product>
         </function>
      </axis>
      <axis name="YAW">
         <function name="aero/forces/yaw_basic_Mach">
            <description>yaw force due to alpha beta Reynolds number and Mach number</description>
            <product>
               <property>aero/qbar-psf</property>
               <property>metrics/Sw-sqft</property>
               <property>aero/function/yaw_coeff_basic_Mach</property>
            </product>
         </function>
         <function name="aero/function/yaw_coeff_basic_Mach">
            <product>
               <interpolate1d>
                  <p>velocities/mach</p>
                  <v>0.200</v>
                  <p>aero/function/yaw_coeff_basic_M0</p>
                  <v>0.600</v>
                  <p>aero/function/yaw_coeff_basic_M1</p>
                  <v>0.780</v>
                  <p>aero/function/yaw_coeff_basic_M2</p>
                  <v>0.800</v>
                  <p>aero/function/yaw_coeff_basic_M3</p>
               </interpolate1d>
            </product>
         </function>
         <function name="aero/function/yaw_coeff_basic_M0">
            <product>
               <table>
                  <independentVar lookup="row">aero/alpha-deg</independentVar>
                  <independentVar lookup="column">aero/beta-deg</independentVar>
                  <independentVar lookup="table">aero/Re</independentVar>
                  <tableData breakPoint="201825.0784">
 	0.0	10.0
-5.0	1.4073E-7	-0.040397
-2.5	1.3971E-7	-0.039853
0.0	1.3846E-7	-0.039544
1.0	1.379E-7	-0.039495
2.0	1.3728E-7	-0.039498
3.0	1.366E-7	-0.039567
4.0	1.3582E-7	-0.039736
5.0	1.3489E-7	-0.040087
6.0	1.3382E-7	-0.040802
7.5	1.3252E-7	-0.040748
10.0	1.3399E-7	-0.040211
12.5	1.3777E-7	-0.035925
</tableData>
                  <tableData breakPoint="3.36054752352E7">
 	0.0	10.0
-5.0	1.4073E-7	-0.040397
-2.5	1.3971E-7	-0.039853
0.0	1.3846E-7	-0.039544
1.0	1.379E-7	-0.039495
2.0	1.3728E-7	-0.039498
3.0	1.366E-7	-0.039567
4.0	1.3582E-7	-0.039736
5.0	1.3489E-7	-0.040087
6.0	1.3382E-7	-0.040802
7.5	1.3252E-7	-0.040748
10.0	1.3399E-7	-0.040211
12.5	1.3777E-7	-0.035925
</tableData>
                  <tableData breakPoint="4.36871178058E7">
 	0.0	10.0
-5.0	1.4073E-7	-0.040397
-2.5	1.3971E-7	-0.039853
0.0	1.3846E-7	-0.039544
1.0	1.379E-7	-0.039495
2.0	1.3728E-7	-0.039498
3.0	1.366E-7	-0.039567
4.0	1.3582E-7	-0.039736
5.0	1.3489E-7	-0.040087
6.0	1.3382E-7	-0.040802
7.5	1.3252E-7	-0.040748
10.0	1.3399E-7	-0.040211
12.5	1.3777E-7	-0.035925
</tableData>
                  <tableData breakPoint="4.48073003136E7">
 	0.0	10.0
-5.0	1.4073E-7	-0.040397
-2.5	1.3971E-7	-0.039853
0.0	1.3846E-7	-0.039544
1.0	1.379E-7	-0.039495
2.0	1.3728E-7	-0.039498
3.0	1.366E-7	-0.039567
4.0	1.3582E-7	-0.039736
5.0	1.3489E-7	-0.040087
6.0	1.3382E-7	-0.040802
7.5	1.3252E-7	-0.040748
10.0	1.3399E-7	-0.040211
12.5	1.3777E-7	-0.035925
</tableData>
               </table>
            </product>
         </function>
         <function name="aero/function/yaw_coeff_basic_M1">
            <product>
               <table>
                  <independentVar lookup="row">aero/alpha-deg</independentVar>
                  <independentVar lookup="column">aero/beta-deg</independentVar>
                  <independentVar lookup="table">aero/Re</independentVar>
                  <tableData breakPoint="201825.0784">
 	0.0	10.0
-5.0	1.7236E-7	-0.049476
-2.5	1.7111E-7	-0.048809
0.0	1.6958E-7	-0.048431
1.0	1.6889E-7	-0.048371
2.0	1.6814E-7	-0.048375
3.0	1.6731E-7	-0.04846
4.0	1.6634E-7	-0.048667
5.0	1.652E-7	-0.049096
6.0	1.6389E-7	-0.049972
7.5	1.623E-7	-0.049906
10.0	1.641E-7	-0.049248
12.5	1.6874E-7	-0.043999
</tableData>
                  <tableData breakPoint="3.36054752352E7">
 	0.0	10.0
-5.0	1.7236E-7	-0.049476
-2.5	1.7111E-7	-0.048809
0.0	1.6958E-7	-0.048431
1.0	1.6889E-7	-0.048371
2.0	1.6814E-7	-0.048375
3.0	1.6731E-7	-0.04846
4.0	1.6634E-7	-0.048667
5.0	1.652E-7	-0.049096
6.0	1.6389E-7	-0.049972
7.5	1.623E-7	-0.049906
10.0	1.641E-7	-0.049248
12.5	1.6874E-7	-0.043999
</tableData>
                  <tableData breakPoint="4.36871178058E7">
 	0.0	10.0
-5.0	1.7236E-7	-0.049476
-2.5	1.7111E-7	-0.048809
0.0	1.6958E-7	-0.048431
1.0	1.6889E-7	-0.048371
2.0	1.6814E-7	-0.048375
3.0	1.6731E-7	-0.04846
4.0	1.6634E-7	-0.048667
5.0	1.652E-7	-0.049096
6.0	1.6389E-7	-0.049972
7.5	1.623E-7	-0.049906
10.0	1.641E-7	-0.049248
12.5	1.6874E-7	-0.043999
</tableData>
                  <tableData breakPoint="4.48073003136E7">
 	0.0	10.0
-5.0	1.7236E-7	-0.049476
-2.5	1.7111E-7	-0.048809
0.0	1.6958E-7	-0.048431
1.0	1.6889E-7	-0.048371
2.0	1.6814E-7	-0.048375
3.0	1.6731E-7	-0.04846
4.0	1.6634E-7	-0.048667
5.0	1.652E-7	-0.049096
6.0	1.6389E-7	-0.049972
7.5	1.623E-7	-0.049906
10.0	1.641E-7	-0.049248
12.5	1.6874E-7	-0.043999
</tableData>
               </table>
            </product>
         </function>
         <function name="aero/function/yaw_coeff_basic_M2">
            <product>
               <table>
                  <independentVar lookup="row">aero/alpha-deg</independentVar>
                  <independentVar lookup="column">aero/beta-deg</independentVar>
                  <independentVar lookup="table">aero/Re</independentVar>
                  <tableData breakPoint="201825.0784">
 	0.0	10.0
-5.0	2.2035E-7	-0.063251
-2.5	2.1875E-7	-0.062398
0.0	2.1679E-7	-0.061914
1.0	2.1591E-7	-0.061838
2.0	2.1495E-7	-0.061843
3.0	2.1388E-7	-0.061951
4.0	2.1266E-7	-0.062216
5.0	2.112E-7	-0.062765
6.0	2.0952E-7	-0.063885
7.5	2.0749E-7	-0.0638
10.0	2.0979E-7	-0.062959
12.5	2.1572E-7	-0.056249
</tableData>
                  <tableData breakPoint="3.36054752352E7">
 	0.0	10.0
-5.0	2.2035E-7	-0.063251
-2.5	2.1875E-7	-0.062398
0.0	2.1679E-7	-0.061914
1.0	2.1591E-7	-0.061838
2.0	2.1495E-7	-0.061843
3.0	2.1388E-7	-0.061951
4.0	2.1266E-7	-0.062216
5.0	2.112E-7	-0.062765
6.0	2.0952E-7	-0.063885
7.5	2.0749E-7	-0.0638
10.0	2.0979E-7	-0.062959
12.5	2.1572E-7	-0.056249
</tableData>
                  <tableData breakPoint="4.36871178058E7">
 	0.0	10.0
-5.0	2.2035E-7	-0.063251
-2.5	2.1875E-7	-0.062398
0.0	2.1679E-7	-0.061914
1.0	2.1591E-7	-0.061838
2.0	2.1495E-7	-0.061843
3.0	2.1388E-7	-0.061951
4.0	2.1266E-7	-0.062216
5.0	2.112E-7	-0.062765
6.0	2.0952E-7	-0.063885
7.5	2.0749E-7	-0.0638
10.0	2.0979E-7	-0.062959
12.5	2.1572E-7	-0.056249
</tableData>
                  <tableData breakPoint="4.48073003136E7">
 	0.0	10.0
-5.0	2.2035E-7	-0.063251
-2.5	2.1875E-7	-0.062398
0.0	2.1679E-7	-0.061914
1.0	2.1591E-7	-0.061838
2.0	2.1495E-7	-0.061843
3.0	2.1388E-7	-0.061951
4.0	2.1266E-7	-0.062216
5.0	2.112E-7	-0.062765
6.0	2.0952E-7	-0.063885
7.5	2.0749E-7	-0.0638
10.0	2.0979E-7	-0.062959
12.5	2.1572E-7	-0.056249
</tableData>
               </table>
            </product>
         </function>
         <function name="aero/function/yaw_coeff_basic_M3">
            <product>
               <table>
                  <independentVar lookup="row">aero/alpha-deg</independentVar>
                  <independentVar lookup="column">aero/beta-deg</independentVar>
                  <independentVar lookup="table">aero/Re</independentVar>
                  <tableData breakPoint="201825.0784">
 	0.0	10.0
-5.0	2.2981E-7	-0.065969
-2.5	2.2815E-7	-0.065079
0.0	2.2611E-7	-0.064575
1.0	2.2518E-7	-0.064495
2.0	2.2418E-7	-0.0645
3.0	2.2307E-7	-0.064613
4.0	2.2179E-7	-0.064889
5.0	2.2027E-7	-0.065462
6.0	2.1852E-7	-0.066629
7.5	2.1641E-7	-0.066541
10.0	2.188E-7	-0.065664
12.5	2.2499E-7	-0.058665
</tableData>
                  <tableData breakPoint="3.36054752352E7">
 	0.0	10.0
-5.0	2.2981E-7	-0.065969
-2.5	2.2815E-7	-0.065079
0.0	2.2611E-7	-0.064575
1.0	2.2518E-7	-0.064495
2.0	2.2418E-7	-0.0645
3.0	2.2307E-7	-0.064613
4.0	2.2179E-7	-0.064889
5.0	2.2027E-7	-0.065462
6.0	2.1852E-7	-0.066629
7.5	2.1641E-7	-0.066541
10.0	2.188E-7	-0.065664
12.5	2.2499E-7	-0.058665
</tableData>
                  <tableData breakPoint="4.36871178058E7">
 	0.0	10.0
-5.0	2.2981E-7	-0.065969
-2.5	2.2815E-7	-0.065079
0.0	2.2611E-7	-0.064575
1.0	2.2518E-7	-0.064495
2.0	2.2418E-7	-0.0645
3.0	2.2307E-7	-0.064613
4.0	2.2179E-7	-0.064889
5.0	2.2027E-7	-0.065462
6.0	2.1852E-7	-0.066629
7.5	2.1641E-7	-0.066541
10.0	2.188E-7	-0.065664
12.5	2.2499E-7	-0.058665
</tableData>
                  <tableData breakPoint="4.48073003136E7">
 	0.0	10.0
-5.0	2.2981E-7	-0.065969
-2.5	2.2815E-7	-0.065079
0.0	2.2611E-7	-0.064575
1.0	2.2518E-7	-0.064495
2.0	2.2418E-7	-0.0645
3.0	2.2307E-7	-0.064613
4.0	2.2179E-7	-0.064889
5.0	2.2027E-7	-0.065462
6.0	2.1852E-7	-0.066629
7.5	2.1641E-7	-0.066541
10.0	2.188E-7	-0.065664
12.5	2.2499E-7	-0.058665
</tableData>
               </table>
            </product>
         </function>
      </axis>
            <axis name="LIFT">

            <!-- Lift axis coefficients functions -->
              <function name="aero/function/Lift_coeff_basic_M0">
                <description>CL = f(alpha, beta, Re) at M0=0.3</description>
                <product>
                  <table>
                    <independentVar lookup="row">aero/alpha-deg</independentVar>
                    <independentVar lookup="column">aero/beta-deg</independentVar>
                    <independentVar lookup="table">aero/Re</independentVar>
                    <tableData breakPoint="3000000">
                            0.0   5.0
                       0.0  0.02  0.001
                       5.0  0.12  0.03
                      10.0  0.30  0.08
                    </tableData>
                    <tableData breakPoint="6000000">
                            0.0   5.0
                       0.0  0.05  0.013
                       5.0  0.31  0.23
                      10.0  0.67  0.28
                    </tableData>
                  </table>
                </product>
              </function>

              <function name="aero/function/Lift_coeff_basic_M1">
                <description>CL = f(alpha, beta, Re) at M1=0.6</description>
                <product>
                  <value>4.0</value>
                  <table>
                    <independentVar lookup="row">aero/alpha-deg</independentVar>
                    <independentVar lookup="column">aero/beta-deg</independentVar>
                    <independentVar lookup="table">aero/Re</independentVar>
                    <tableData breakPoint="3E6">
                            0.0   5.0
                       0.0  0.02  0.001
                       5.0  0.12  0.03
                      10.0  0.30  0.08
                    </tableData>
                    <tableData breakPoint="6E6">
                            0.0   5.0
                       0.0  0.05  0.013
                       5.0  0.31  0.23
                      10.0  0.67  0.28
                    </tableData>
                  </table>
                </product>
              </function>


            <!-- Lift axis coefficients functions -->

            <function name="aero/coefficient/CLwbh">
                <description>Lift due to alpha</description>
                <product>
                    <property>aero/function/ground-effect-factor-lift</property>
                    <property>aero/qbar-area</property>
                    <table>
                        <independentVar lookup="row">aero/alpha-rad</independentVar>
                        <independentVar lookup="column">aero/stall-hyst-norm</independentVar>
                        <tableData>
                                   0.0   1.0
                            -0.09 -0.22 -0.22
                             0.0   0.25  0.25
                             0.09  0.73  0.73
                             0.1   0.83  0.78
                             0.12  0.92  0.79
                             0.14  1.02  0.81
                             0.16  1.08  0.82
                             0.17  1.13  0.83
                             0.19  1.19  0.85
                             0.21  1.25  0.86
                             0.24  1.35  0.88
                             0.26  1.44  0.9
                             0.28  1.47  0.92
                             0.3   1.43  0.95
                             0.32  1.38  0.99
                             0.34  1.3   1.05
                             0.36  1.15  1.15
                        </tableData>
                    </table>
                </product>
            </function>

            <function name="aero/coefficient/CLDf">
                <description>Delta lift due to flap deflection</description>
                <product>
                    <property>aero/function/ground-effect-factor-lift</property>
                    <property>aero/qbar-area</property>
                    <table>
                        <independentVar>fcs/flap-pos-deg</independentVar>
                        <tableData>
                            0.0  0.0
                           10.0  0.25
                           20.0  0.30
                           30.0  0.35
                        </tableData>
                    </table>
                </product>
            </function>

            <function name="aero/coefficient/CLDe">
                <description>Lift due to Elevator Deflection.</description>
                <product>
                    <property>aero/qbar-area</property>
                    <property>fcs/elevator-pos-rad</property>
                    <value>0.347</value>
                </product>
            </function>

            <function name="aero/coefficient/CLadot">
                <description>Lift due to alpha rate</description>
                <product>
                    <property>aero/qbar-area</property>
                    <property>aero/alphadot-rad_sec</property>
                    <property>aero/ci2vel</property>
                    <value>1.7</value>
                </product>
            </function>

            <function name="aero/coefficient/CLq">
                <description>Lift due to pitch rate</description>
                <product>
                    <property>aero/qbar-area</property>
                    <property>velocities/q-aero-rad_sec</property>
                    <property>aero/ci2vel</property>
                    <value>3.9</value>
                </product>
            </function>

    <function name="aero/coefficient/CLalpha">
      <description>Lift per radian of Alpha</description>
      <product>
        <property>aero/qbar-area</property>
        <property>aero/alpha-rad</property>
        <table>
          <independentVar lookup="row">aero/alpha-deg</independentVar>
          <independentVar lookup="column">aero/beta-deg</independentVar>
          <independentVar lookup="table">fcs/flap-pos-deg</independentVar>
          <tableData breakPoint="-5">
                      -10.000000   -5.000000   -4.000000   -3.000000   -2.000000   -1.000000    0.000000    1.000000    2.000000    3.000000    4.000000    5.000000   10.000000
          -10.000000    4.579224    4.683079    4.695652    4.705446    4.712455    4.716665    4.718074    4.716681    4.712483    4.705490    4.695709    4.683151    4.579366
           -9.000000    4.588575    4.692626    4.705221    4.715036    4.722056    4.726275    4.727687    4.726290    4.722086    4.715080    4.705281    4.692699    4.588721
           -8.000000    4.594747    4.698920    4.711531    4.721357    4.728385    4.732611    4.734025    4.732626    4.728416    4.721402    4.711592    4.698996    4.594897
           -7.000000    4.597723    4.701945    4.714562    4.724392    4.731425    4.735653    4.737066    4.735669    4.731457    4.724439    4.714625    4.702023    4.597878
           -6.000000    4.597490    4.701688    4.714302    4.724130    4.731162    4.735388    4.736802    4.735404    4.731195    4.724177    4.714366    4.701768    4.597648
           -5.000000    4.594041    4.698139    4.710741    4.720562    4.727585    4.731808    4.733220    4.731825    4.727618    4.720610    4.710807    4.698220    4.594201
           -4.000000    4.587374    4.691299    4.703880    4.713682    4.720695    4.724911    4.726322    4.724928    4.720729    4.713732    4.703947    4.691382    4.587537
           -3.000000    4.577491    4.681170    4.693721    4.703501    4.710497    4.714704    4.716111    4.714720    4.710532    4.703551    4.693788    4.681253    4.577657
           -2.000000    4.564407    4.667766    4.680278    4.690028    4.697003    4.701195    4.702599    4.701213    4.697039    4.690079    4.680347    4.667851    4.564577
           -1.000000    4.548137    4.651103    4.663567    4.673279    4.680228    4.684404    4.685803    4.684422    4.680264    4.673332    4.663638    4.651189    4.548309
            0.000000    4.528703    4.631201    4.643609    4.653277    4.660196    4.664353    4.665745    4.664372    4.660232    4.653332    4.643680    4.631289    4.528878
            1.000000    4.506134    4.608094    4.620437    4.630056    4.636937    4.641072    4.642456    4.641090    4.636972    4.630109    4.620509    4.608183    4.506310
            2.000000    4.480464    4.581812    4.594082    4.603642    4.610483    4.614594    4.615971    4.614612    4.610519    4.603697    4.594154    4.581903    4.480642
            3.000000    4.451731    4.552399    4.564587    4.574084    4.580878    4.584962    4.586330    4.584980    4.580915    4.574139    4.564660    4.552491    4.451910
            4.000000    4.419983    4.519904    4.531998    4.541425    4.548169    4.552222    4.553580    4.552240    4.548207    4.541480    4.532073    4.519995    4.420165
            5.000000    4.385270    4.484371    4.496370    4.505717    4.512407    4.516426    4.517773    4.516445    4.512444    4.505773    4.496444    4.484464    4.385452
            6.000000    4.347646    4.445863    4.457754    4.467019    4.473649    4.477633    4.478968    4.477653    4.473686    4.467075    4.457829    4.445956    4.347829
            7.000000    4.307175    4.404442    4.416217    4.425392    4.431959    4.435905    4.437226    4.435924    4.431995    4.425449    4.416293    4.404535    4.307361
            8.000000    4.263923    4.360175    4.371828    4.380909    4.387405    4.391310    4.392619    4.391329    4.387443    4.380964    4.371903    4.360269    4.264108
            9.000000    4.217959    4.313137    4.324659    4.333638    4.340064    4.343924    4.345218    4.343943    4.340101    4.333694    4.324735    4.313231    4.218145
           10.000000    4.169363    4.263402    4.274788    4.283659    4.290007    4.293822    4.295101    4.293842    4.290045    4.283715    4.274863    4.263497    4.169548
          </tableData>
          <tableData breakPoint="0">
                      -10.000000   -5.000000   -4.000000   -3.000000   -2.000000   -1.000000    0.000000    1.000000    2.000000    3.000000    4.000000    5.000000   10.000000
          -10.000000    4.589282    4.693370    4.705971    4.715788    4.722813    4.727033    4.728446    4.727047    4.722842    4.715832    4.706029    4.693441    4.589424
           -6.000000    4.600316    4.704578    4.717200    4.727036    4.734071    4.738299    4.739714    4.738316    4.734103    4.727083    4.717264    4.704659    4.600473
           -2.000000    4.560090    4.663347    4.675848    4.685589    4.692557    4.696744    4.698147    4.696764    4.692592    4.685639    4.675917    4.663433    4.560259
            2.000000    4.469336    4.570426    4.582664    4.592200    4.599024    4.603125    4.604497    4.603143    4.599059    4.592256    4.582737    4.570517    4.469513
            6.000000    4.330268    4.428081    4.439922    4.449149    4.455751    4.459719    4.461048    4.459738    4.455789    4.449206    4.439997    4.428173    4.330451
           10.000000    4.146493    4.240001    4.251324    4.260144    4.266455    4.270250    4.271521    4.270268    4.266494    4.260201    4.251398    4.240096    4.146679
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          </tableData>
          <tableData breakPoint="10">
                      -10.000000   -5.000000   -4.000000   -3.000000   -2.000000   -1.000000    0.000000    1.000000    2.000000    3.000000    4.000000    5.000000   10.000000
          -10.000000    4.600350    4.704696    4.717329    4.727169    4.734210    4.738441    4.739857    4.738456    4.734239    4.727213    4.717385    4.704768    4.600493
           -6.000000    4.596964    4.701149    4.713761    4.723588    4.730619    4.734845    4.736259    4.734861    4.730652    4.723637    4.713826    4.701229    4.597121
           -2.000000    4.542632    4.645484    4.657935    4.667637    4.674578    4.678750    4.680146    4.678768    4.674612    4.667689    4.658003    4.645569    4.542800
            2.000000    4.438562    4.538937    4.551088    4.560557    4.567332    4.571404    4.572768    4.571423    4.567368    4.560611    4.551160    4.539027    4.438740
            6.000000    4.287412    4.384228    4.395949    4.405082    4.411618    4.415544    4.416860    4.415564    4.411654    4.405138    4.396023    4.384321    4.287594
           10.000000    4.093179    4.185447    4.196619    4.205323    4.211551    4.215295    4.216550    4.215314    4.211590    4.205380    4.196694    4.185541    4.093364
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          </tableData>
          <tableData breakPoint="20">
                      -10.000000   -5.000000   -4.000000   -3.000000   -2.000000   -1.000000    0.000000    1.000000    2.000000    3.000000    4.000000    5.000000   10.000000
          -10.000000    4.599356    4.703678    4.716308    4.726148    4.733187    4.737417    4.738831    4.737432    4.733215    4.726190    4.716364    4.703750    4.599497
           -6.000000    4.581611    4.685439    4.698008    4.707802    4.714808    4.719019    4.720428    4.719035    4.714840    4.707849    4.698071    4.685518    4.581768
           -2.000000    4.513410    4.615582    4.627950    4.637589    4.644485    4.648628    4.650015    4.648644    4.644518    4.637640    4.628019    4.615668    4.513579
            2.000000    4.396430    4.495824    4.507858    4.517234    4.523942    4.527975    4.529325    4.527993    4.523979    4.517288    4.507930    4.495914    4.396607
            6.000000    4.233758    4.329326    4.340896    4.349912    4.356362    4.360240    4.361538    4.360259    4.356400    4.349968    4.340970    4.329419    4.233942
           10.000000    4.029764    4.120556    4.131549    4.140115    4.146243    4.149927    4.151161    4.149946    4.146281    4.140171    4.131624    4.120651    4.029948
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          </tableData>
          <tableData breakPoint="30">
                      -10.000000   -5.000000   -4.000000   -3.000000   -2.000000   -1.000000    0.000000    1.000000    2.000000    3.000000    4.000000    5.000000   10.000000
          -10.000000    4.586298    4.690317    4.702909    4.712720    4.719739    4.723957    4.725368    4.723971    4.719768    4.712763    4.702966    4.690388    4.586439
           -6.000000    4.554257    4.657447    4.669940    4.679673    4.686637    4.690822    4.692222    4.690837    4.686669    4.679721    4.670004    4.657526    4.554414
           -2.000000    4.472424    4.573642    4.585896    4.595443    4.602274    4.606380    4.607756    4.606398    4.602309    4.595495    4.585965    4.573728    4.472592
            2.000000    4.342940    4.441091    4.452973    4.462232    4.468857    4.472839    4.474172    4.472857    4.468893    4.462287    4.453045    4.441180    4.343118
            6.000000    4.169307    4.263375    4.274764    4.283638    4.289988    4.293805    4.295083    4.293823    4.290025    4.283695    4.274838    4.263467    4.169489
           10.000000    3.956245    4.045328    4.056114    4.064517    4.070530    4.074146    4.075357    4.074164    4.070569    4.064574    4.056189    4.045422    3.956429
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          </tableData>
          <tableData breakPoint="40">
                      -10.000000   -5.000000   -4.000000   -3.000000   -2.000000   -1.000000    0.000000    1.000000    2.000000    3.000000    4.000000    5.000000   10.000000
          -10.000000    4.561178    4.664611    4.677133    4.686889    4.693869    4.698062    4.699466    4.698076    4.693898    4.686932    4.677190    4.664682    4.561318
           -6.000000    4.514900    4.617175    4.629557    4.639204    4.646107    4.650254    4.651642    4.650270    4.646139    4.639252    4.629621    4.617255    4.515057
           -2.000000    4.419673    4.519666    4.531770    4.541202    4.547951    4.552007    4.553365    4.552024    4.547985    4.541254    4.531839    4.519750    4.419842
            2.000000    4.278092    4.374733    4.386434    4.395551    4.402073    4.405993    4.407308    4.406013    4.402110    4.395605    4.386506    4.374824    4.278268
            6.000000    4.094057    4.186376    4.197553    4.206261    4.212493    4.216238    4.217494    4.216258    4.212531    4.206317    4.197627    4.186468    4.094239
           10.000000    3.872623    3.959762    3.970312    3.978533    3.984415    3.987951    3.989137    3.987969    3.984453    3.978589    3.970388    3.959856    3.872807
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          </tableData>
          <tableData breakPoint="50">
                      -10.000000   -5.000000   -4.000000   -3.000000   -2.000000   -1.000000    0.000000    1.000000    2.000000    3.000000    4.000000    5.000000   10.000000
          -10.000000    4.523993    4.626563    4.638979    4.648654    4.655575    4.659734    4.661125    4.659748    4.655604    4.648696    4.639036    4.626634    4.524133
           -6.000000    4.463542    4.564622    4.576860    4.586395    4.593215    4.597316    4.598688    4.597332    4.593248    4.586442    4.576923    4.564702    4.463697
           -2.000000    4.355160    4.453650    4.465575    4.474865    4.481512    4.485507    4.486845    4.485526    4.481547    4.474917    4.465643    4.453735    4.355328
            2.000000    4.201886    4.296754    4.308240    4.317191    4.323593    4.327443    4.328732    4.327460    4.323629    4.317245    4.308312    4.296844    4.202062
            6.000000    4.008010    4.098327    4.109261    4.117783    4.123878    4.127543    4.128772    4.127562    4.123916    4.117837    4.109335    4.098420    4.008192
           10.000000    3.778901    3.863860    3.874145    3.882161    3.887895    3.891344    3.892500    3.891363    3.887933    3.882217    3.874220    3.863953    3.779085
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          </tableData>
        </table>
      </product>
    </function>

        </axis>

        <axis name="DRAG">

            <!-- Drag axis coefficient functions -->

            <function name="aero/coefficient/CDo">
                <description>
                  Drag at zero lift.
                  Source: http://www.hq.nasa.gov/pao/History/SP-468/ch6-3.htm
                </description>
                <product>
                    <property>aero/qbar-area</property>
                    <value>0.032</value>
                </product>
            </function>

            <function name="aero/coefficient/CDDf">
                <description>Delta drag due to flap deflection</description>
                <product>
                    <property>aero/function/ground-effect-factor-drag</property>
                    <property>aero/qbar-area</property>
                    <table>
                        <independentVar>fcs/flap-pos-deg</independentVar>
                        <tableData>
                          0.0  0.0
                          10.0  0.007
                          20.0  0.012
                          30.0  0.018
                        </tableData>
                    </table>
                </product>
            </function>

            <function name="aero/coefficient/CDwbh">
                <description>Drag due to alpha</description>
                <product>
                    <property>aero/function/ground-effect-factor-drag</property>
                    <property>aero/qbar-area</property>
                    <table>
                        <independentVar lookup="row">aero/alpha-rad</independentVar>
                        <independentVar lookup="column">fcs/flap-pos-deg</independentVar>
                        <tableData>
                                        0.0         10.0        20.0         30.0
                            -0.0872664  0.00407143  3.8165e-05  0.000512444  0.00137231
                             0.0        0.0051894   0.0168137   0.0251167    0.0298909
                             0.0872664  0.0442427   0.0718077   0.088081     0.0968405
                             0.174533   0.106859    0.147857    0.170848     0.182966
                             0.261799   0.172732    0.223956    0.252059     0.266733
                             0.349066   0.109678    0.151171    0.174408     0.186649
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                        </tableData>
                    </table>
                </product>
            </function>

            <function name="aero/coefficient/CDDe">
                <description>Drag due to Elevator Deflection</description>
                <product>
                    <property>aero/qbar-area</property>
                    <property>fcs/mag-elevator-pos-rad</property>
                    <value>0.06</value>
                </product>
            </function>

            <function name="aero/coefficient/CDbeta">
                <description>Drag due to sideslip</description>
                <product>
                    <property>aero/qbar-area</property>
                    <property>aero/mag-beta-rad</property>
                    <value>0.17</value>
                </product>
            </function>

        </axis>

        <axis name="SIDE">

            <!-- Side axis coefficient functions -->

            <function name="aero/coefficient/CYb">
                <description>Side force due to beta</description>
                <product>
                    <property>aero/qbar-area</property>
                    <table>
                        <independentVar>aero/beta-rad</independentVar>
                        <tableData>
                            -0.349  0.108
                             0.0    0.0
                             0.349 -0.108
                        </tableData>
                    </table>
                </product>
            </function>

            <function name="aero/coefficient/CYda">
                <description>Side force due to aileron</description>
                <product>
                    <property>aero/qbar-area</property>
                    <property>fcs/right-aileron-pos-deg</property>
                    <value>-0.05</value>
                </product>
            </function>

            <function name="aero/coefficient/CYdr">
                <description>Side force due to rudder</description>
                <product>
                    <property>aero/qbar-area</property>
                    <property>fcs/rudder-pos-rad</property>
                    <value>0.098</value>
                </product>
            </function>

            <function name="aero/coefficient/CYp">
                <description>Side force due to roll rate</description>
                <product>
                    <property>aero/qbar-area</property>
                    <property>aero/bi2vel</property>
                    <property>velocities/p-aero-rad_sec</property>
                    <value>-0.037</value>
                </product>
            </function>

            <function name="aero/coefficient/CYr">
                <description>Side force due to yaw rate</description>
                <product>
                    <property>aero/qbar-area</property>
                    <property>aero/bi2vel</property>
                    <property>velocities/r-aero-rad_sec</property>
                    <value>0.21</value>
                </product>
            </function>

        </axis>

        <axis name="ROLL">

            <!-- Roll axis coefficient functions -->

            <function name="aero/coefficient/Clb">
                <description>Roll moment due to beta</description>
                <product>
                    <property>aero/qbar-area</property>
                    <property>metrics/bw-ft</property>
                    <table>
                        <independentVar>aero/beta-rad</independentVar>
                        <tableData>
                            -0.349  0.0311
                             0.0    0.0
                             0.349 -0.0311
                        </tableData>
                    </table>
                </product>
            </function>

            <function name="aero/coefficient/Clp">
                <description>Roll moment due to roll rate (roll damping)</description>
                <product>
                    <property>aero/qbar-area</property>
                    <property>metrics/bw-ft</property>
                    <property>aero/bi2vel</property>
                    <property>velocities/p-aero-rad_sec</property>
                    <value>-0.47</value>
                </product>
            </function>

            <function name="aero/coefficient/Clr">
                <description>Roll moment due to yaw rate</description>
                <product>
                    <property>aero/qbar-area</property>
                    <property>metrics/bw-ft</property>
                    <property>aero/bi2vel</property>
                    <property>velocities/r-aero-rad_sec</property>
                    <table>
                        <independentVar>aero/alpha-rad</independentVar>
                        <tableData>
                             0.000  0.08
                             0.094  0.19
                        </tableData>
                    </table>
                </product>
            </function>

            <function name="aero/coefficient/Clda">
                <description>Roll moment due to aileron</description>
                <product>
                    <property>aero/qbar-area</property>
                    <property>metrics/bw-ft</property>
                    <property>fcs/right-aileron-pos-deg</property>
                    <value>0.23</value>
                </product>
            </function>

            <function name="aero/coefficient/Cldr">
                <description>Roll moment due to rudder</description>
                <product>
                    <property>aero/qbar-area</property>
                    <property>metrics/bw-ft</property>
                    <property>fcs/rudder-pos-rad</property>
                    <value>0.0147</value>
                </product>
            </function>

        </axis>

        <axis name="PITCH">

            <!-- Pitch axis coefficient functions -->

            <function name="aero/coefficient/Cmalpha">
                <description>Pitch moment due to alpha</description>
                <product>
                    <property>aero/qbar-area</property>
                    <property>metrics/cbarw-ft</property>
                    <property>aero/alpha-rad</property>
                    <value>-1.8</value>
                </product>
            </function>

            <function name="aero/coefficient/CmDf">
                <description>Delta pitching moment due to flap deflection</description>
                <product>
                    <property>aero/qbar-area</property>
                    <property>metrics/cbarw-ft</property>
                    <table>
                        <independentVar>fcs/flap-pos-deg</independentVar>
                        <tableData>
<!--                          0.0   0.0
                          10.0  -0.0654
                          20.0  -0.0981
                          30.0  -0.1140 -->
                          0.0   0.0
                          10.0  -0.03
                          20.0  -0.05
                          30.0  -0.06
                        </tableData>
                    </table>
                </product>
            </function>

            <function name="aero/coefficient/Cmq">
                <description>Pitch moment due to pitch rate</description>
                <product>
                    <property>aero/qbar-area</property>
                    <property>metrics/cbarw-ft</property>
                    <property>aero/ci2vel</property>
                    <property>velocities/q-aero-rad_sec</property>
                    <value>-12.4</value>
                </product>
            </function>

            <function name="aero/coefficient/Cmadot">
                <description>Pitch moment due to alpha rate</description>
                <product>
                    <property>aero/qbar-area</property>
                    <property>metrics/cbarw-ft</property>
                    <property>aero/ci2vel</property>
                    <property>aero/alphadot-rad_sec</property>
                    <value>-5.2</value>
                </product>
            </function>

            <function name="aero/coefficient/Cmo">
                <description>Pitching moment at zero alpha</description>
                <product>
                    <property>aero/qbar-area</property>
                    <property>metrics/cbarw-ft</property>
                    <value>0.1</value>
                </product>
            </function>

            <function name="aero/coefficient/Cmde">
                <description>Pitch moment due to elevator deflection</description>
                <product>
                    <property>aero/qbar-area</property>
                    <property>metrics/cbarw-ft</property>
                    <property>fcs/elevator-pos-rad</property>
                    <value>-1.28</value>
                </product>
            </function>

        </axis>

        <axis name="YAW">

            <!-- Yaw axis coefficient functions -->

            <function name="aero/coefficient/Cnb">
                <description>Yaw moment due to beta</description>
                <product>
                    <property>aero/qbar-area</property>
                    <property>metrics/bw-ft</property>
                    <table>
                        <independentVar>aero/beta-rad</independentVar>
                        <tableData>
                            -0.349  -0.0227
                             0.0     0.0
                             0.349   0.0227
                        </tableData>
                    </table>
                </product>
            </function>

            <function name="aero/coefficient/Cnp">
                <description>Yaw moment due to roll rate</description>
                <product>
                    <property>aero/qbar-area</property>
                    <property>metrics/bw-ft</property>
                    <property>aero/bi2vel</property>
                    <property>velocities/p-aero-rad_sec</property>
                    <value>-0.03</value>
                </product>
            </function>

            <function name="aero/coefficient/Cnr">
                <description>Yaw moment due to yaw rate</description>
                <product>
                    <property>aero/qbar-area</property>
                    <property>metrics/bw-ft</property>
                    <property>aero/bi2vel</property>
                    <property>velocities/r-aero-rad_sec</property>
                    <value>-0.099</value>
                </product>
            </function>

            <function name="aero/coefficient/Cnda">
                <description>Yaw moment due to aileron</description>
                <product>
                    <property>aero/qbar-area</property>
                    <property>metrics/bw-ft</property>
                    <property>fcs/right-aileron-pos-deg</property>
                    <value>0.0053</value>
                </product>
            </function>

            <function name="aero/coefficient/Cndr">
                <description>Yaw moment due to rudder</description>
                <product>
                    <property>aero/qbar-area</property>
                    <property>metrics/bw-ft</property>
                    <property>fcs/rudder-pos-rad</property>
                    <value>-0.043</value>
                </product>
            </function>

        </axis>

   </aerodynamics>
   <output name="D150 AGILE.csv" rate="10" type="CSV">
      <property>aero/forces/drag_basic_Mach</property>
      <property>aero/forces/lift_basic_Mach</property>
      <property>aero/function/lift_coeff_basic_Mach</property>
      <property>aero/function/drag_coeff_basic_Mach</property>
      <property>aero/alpha-deg</property>
      <property>aero/beta-deg</property>
      <property>aero/Re</property>
      <property>velocities/mach</property>
	  <property>fcs/elevator-pos-deg</property>
      <property>fcs/flap-pos-deg</property>
      <property>fcs/rudder-pos-deg</property>
	  <property>fcs/right-aileron-pos-deg</property>
   </output>
</fdm_config>
